**
** Heading +++++++++++++++++++++++++++++++++++++++++++++++++
**
*Heading
Hash: PXJD0WWr, Date: 03/11/2021, Unit system: MM_TON_S_C
**
** Nodes +++++++++++++++++++++++++++++++++++++++++++++++++++
**
*Node
1210, 3.90000000E+001, 3.57500000E+001, 5.00000000E+000
1077, 3.00000000E+001, 5.40000000E+001, 0.00000000E+000
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**
** Elements ++++++++++++++++++++++++++++++++++++++++++++++++
**
*Element, Type=C3D20, Elset=Solid_part-1
1087, 1038, 1037, 1045, 1052, 1072, 1065, 1101, 1192, 1199, 1201, 1267, 1209, 1280, 1296, 1519
1512, 1233, 1225, 1295, 1497
1088, 1072, 1065, 1101, 1192, 1071, 1064, 1102, 1193, 1280, 1296, 1519, 1512, 1279, 1298, 1520
1513, 1232, 1224, 1297, 1499
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**
** Node sets +++++++++++++++++++++++++++++++++++++++++++++++
**
*Nset, Nset=BC
1039, 1040, 1043, 1044, 1087, 1088
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*Nset, Nset=Vertex
1042
*Nset, Nset=Load
1037, 1038, 1041, 1042, 1059, 1060
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*Nset, Nset=ZSYMM
1037, 1038, 1039, 1040, 1041, 1042
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*Nset, Nset=Internal-1_Internal_Selection-1_Traction
1038, 1037, 1065, 1072, 1199, 1225
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**
** Element sets ++++++++++++++++++++++++++++++++++++++++++++
**
*Elset, Elset=C3D20
1087, 1088, 1089, 1090, 1091, 1092
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*Elset, Elset=Internal-1_Internal_Selection-1_Traction_S3
1087, 1088, 1089, 1090, 1091, 1092, 1093, 1094
**
** Surfaces ++++++++++++++++++++++++++++++++++++++++++++++++
**
*Surface, Name=Internal_Selection-1_Traction, Type=Element
Internal-1_Internal_Selection-1_Traction_S3, S3
**
** Materials +++++++++++++++++++++++++++++++++++++++++++++++
**
** Name: Material-1: Deactivated
*Material, Name=Rubber
*Elastic,
70.0, 0.33
**
** Sections ++++++++++++++++++++++++++++++++++++++++++++++++
**
*SOLID SECTION, ELSET=Solid_part-1, Material=Rubber
**
** Pre-tension sections ++++++++++++++++++++++++++++++++++++
**
**
** Constraints +++++++++++++++++++++++++++++++++++++++++++++
**
**
** Surface interactions ++++++++++++++++++++++++++++++++++++
**
**
** Contact pairs +++++++++++++++++++++++++++++++++++++++++++
**
**
** Steps +++++++++++++++++++++++++++++++++++++++++++++++++++
**
**
** Step-1 ++++++++++++++++++++++++++++++++++++++++++++++++++
**
*Step
*Static
**
** Boundary conditions +++++++++++++++++++++++++++++++++++++
**
*Boundary, op=New
** Name: Disp_rot-1
*Boundary
BC, 1, 1, 0
BC, 2, 2, 0
BC, 3, 3, 0
** Name: Disp_rot-2
*Boundary
ZSYMM, 3, 3, 0
**
** Loads +++++++++++++++++++++++++++++++++++++++++++++++++++
**
*Dload, op=New
*Cload, op=New
** Name: Traction
*Cload
1038, 2, -5.20833333333333
1072, 2, -10.4166666666667
1065, 2, -10.4166666666667
1037, 2, -5.20833333333333
1233, 2, 20.8333333333333
1280, 2, 41.6666666666667
1225, 2, 20.8333333333333
1199, 2, 20.8333333333333
1071, 2, -10.4166666666667
1064, 2, -10.4166666666667
1232, 2, 20.8333333333333
1279, 2, 41.6666666666667
1224, 2, 20.8333333333333
1070, 2, -10.4166666666667
1063, 2, -10.4166666666667
1231, 2, 20.8333333333333
1278, 2, 41.6666666666667
1223, 2, 20.8333333333333
1069, 2, -10.4166666666667
1062, 2, -10.4166666666667
1230, 2, 20.8333333333333
1277, 2, 41.6666666666667
1222, 2, 20.8333333333333
1068, 2, -10.4166666666667
1061, 2, -10.4166666666667
1229, 2, 20.8333333333333
1276, 2, 41.6666666666667
1221, 2, 20.8333333333333
1067, 2, -10.4166666666667
1060, 2, -10.4166666666667
1228, 2, 20.8333333333333
1275, 2, 41.6666666666667
1220, 2, 20.8333333333333
1066, 2, -10.4166666666667
1059, 2, -10.4166666666667
1227, 2, 20.8333333333333
1274, 2, 41.6666666666667
1219, 2, 20.8333333333333
1042, 2, -5.20833333333333
1041, 2, -5.20833333333333
1226, 2, 20.8333333333333
1217, 2, 20.8333333333333
1218, 2, 20.8333333333333
**
** History outputs +++++++++++++++++++++++++++++++++++++++++
**
*Node print, Nset=Vertex
U
**
** Field outputs +++++++++++++++++++++++++++++++++++++++++++
**
*Node file
RF, U
*El file
S, E
*NODE PRINT, NSET=Vertex,
U2
**
** End step ++++++++++++++++++++++++++++++++++++++++++++++++
**
*End step
