**
** Heading +++++++++++++++++++++++++++++++++++++++++++++++++
**
*Heading
Hash: PXJD0WWr, Date: 03/11/2021, Unit system: MM_TON_S_C
**
** Nodes +++++++++++++++++++++++++++++++++++++++++++++++++++
**
*Node
185, 1.20000000E+001, 1.10000000E+001, 0.00000000E+000
206, 0.00000000E+000, 3.30000000E+001, 5.00000000E+000
191, 4.80000000E+001, 4.80000000E+001, 0.00000000E+000
222, 3.60000000E+001, 3.87500000E+001, 5.00000000E+000
203, 0.00000000E+000, 3.30000000E+001, 0.00000000E+000
209, 3.60000000E+001, 5.02500000E+001, 0.00000000E+000
210, 2.40000000E+001, 2.95000000E+001, 0.00000000E+000
213, 1.20000000E+001, 2.02500000E+001, 0.00000000E+000
178, 0.00000000E+000, 0.00000000E+000, 5.00000000E+000
221, 2.40000000E+001, 4.45000000E+001, 5.00000000E+000
200, 3.60000000E+001, 5.60000000E+001, 5.00000000E+000
219, 2.40000000E+001, 2.95000000E+001, 5.00000000E+000
224, 3.60000000E+001, 5.02500000E+001, 5.00000000E+000
195, 1.20000000E+001, 4.80000000E+001, 0.00000000E+000
201, 0.00000000E+000, 1.10000000E+001, 0.00000000E+000
198, 1.20000000E+001, 4.80000000E+001, 5.00000000E+000
207, 3.60000000E+001, 3.87500000E+001, 0.00000000E+000
197, 3.60000000E+001, 5.60000000E+001, 0.00000000E+000
212, 2.40000000E+001, 4.45000000E+001, 0.00000000E+000
214, 1.20000000E+001, 2.95000000E+001, 0.00000000E+000
184, 2.40000000E+001, 2.20000000E+001, 0.00000000E+000
215, 1.20000000E+001, 3.87500000E+001, 0.00000000E+000
177, 0.00000000E+000, 0.00000000E+000, 0.00000000E+000
218, 1.20000000E+001, 3.87500000E+001, 5.00000000E+000
216, 1.20000000E+001, 2.02500000E+001, 5.00000000E+000
217, 1.20000000E+001, 2.95000000E+001, 5.00000000E+000
199, 2.40000000E+001, 5.20000000E+001, 5.00000000E+000
220, 2.40000000E+001, 3.70000000E+001, 5.00000000E+000
192, 4.80000000E+001, 5.60000000E+001, 5.00000000E+000
190, 4.80000000E+001, 5.20000000E+001, 0.00000000E+000
188, 1.20000000E+001, 1.10000000E+001, 5.00000000E+000
180, 4.80000000E+001, 6.00000000E+001, 5.00000000E+000
187, 2.40000000E+001, 2.20000000E+001, 5.00000000E+000
196, 2.40000000E+001, 5.20000000E+001, 0.00000000E+000
194, 4.80000000E+001, 4.80000000E+001, 5.00000000E+000
181, 0.00000000E+000, 4.40000000E+001, 0.00000000E+000
208, 3.60000000E+001, 4.45000000E+001, 0.00000000E+000
176, 4.80000000E+001, 4.40000000E+001, 5.00000000E+000
182, 0.00000000E+000, 4.40000000E+001, 5.00000000E+000
193, 4.80000000E+001, 5.20000000E+001, 5.00000000E+000
175, 4.80000000E+001, 4.40000000E+001, 0.00000000E+000
223, 3.60000000E+001, 4.45000000E+001, 5.00000000E+000
205, 0.00000000E+000, 2.20000000E+001, 5.00000000E+000
186, 3.60000000E+001, 3.30000000E+001, 5.00000000E+000
204, 0.00000000E+000, 1.10000000E+001, 5.00000000E+000
189, 4.80000000E+001, 5.60000000E+001, 0.00000000E+000
211, 2.40000000E+001, 3.70000000E+001, 0.00000000E+000
183, 3.60000000E+001, 3.30000000E+001, 0.00000000E+000
179, 4.80000000E+001, 6.00000000E+001, 0.00000000E+000
202, 0.00000000E+000, 2.20000000E+001, 0.00000000E+000
**
** Elements ++++++++++++++++++++++++++++++++++++++++++++++++
**
*Element, Type=C3D8, Elset=Solid_part-1
363, 176, 175, 183, 186, 194, 191, 207, 222
364, 194, 191, 207, 222, 193, 190, 208, 223
365, 193, 190, 208, 223, 192, 189, 209, 224
366, 192, 189, 209, 224, 180, 179, 197, 200
367, 186, 183, 184, 187, 222, 207, 210, 219
368, 222, 207, 210, 219, 223, 208, 211, 220
369, 223, 208, 211, 220, 224, 209, 212, 221
370, 224, 209, 212, 221, 200, 197, 196, 199
371, 187, 184, 185, 188, 219, 210, 213, 216
372, 219, 210, 213, 216, 220, 211, 214, 217
373, 220, 211, 214, 217, 221, 212, 215, 218
374, 221, 212, 215, 218, 199, 196, 195, 198
375, 188, 185, 177, 178, 216, 213, 201, 204
376, 216, 213, 201, 204, 217, 214, 202, 205
377, 217, 214, 202, 205, 218, 215, 203, 206
378, 218, 215, 203, 206, 198, 195, 181, 182
**
** Node sets +++++++++++++++++++++++++++++++++++++++++++++++
**
*Nset, Nset=BC
177, 178, 181, 182, 201, 202, 203, 204, 205, 206
*Nset, Nset=Vertex
180
*Nset, Nset=Load
175, 176, 179, 180, 189, 190, 191, 192, 193, 194
*Nset, Nset=ZSYMM
175, 176, 177, 178, 179, 180, 181, 182, 183, 184, 185, 186, 187, 188, 189, 190,
191, 192, 193, 194, 195, 196, 197, 198, 199, 200, 201, 202, 203, 204, 205, 206,
207, 208, 209, 210, 211, 212, 213, 214, 215, 216, 217, 218, 219, 220, 221, 222,
223, 224
*Nset, Nset=Internal-1_Internal_Selection-1_Traction
176, 175, 191, 194, 190, 193, 189, 192, 179, 180
**
** Element sets ++++++++++++++++++++++++++++++++++++++++++++
**
*Elset, Elset=C3D8
363, 364, 365, 366, 367, 368, 369, 370, 371, 372, 373, 374, 375, 376, 377, 378
*Elset, Elset=Internal-1_Internal_Selection-1_Traction_S3
363, 364, 365, 366
**
** Surfaces ++++++++++++++++++++++++++++++++++++++++++++++++
**
*Surface, Name=Internal_Selection-1_Traction, Type=Element
Internal-1_Internal_Selection-1_Traction_S3, S3
**
** Materials +++++++++++++++++++++++++++++++++++++++++++++++
**
** Name: Material-1: Deactivated
*Material, Name=Rubber
*Elastic,
70.0, 0.4999
**
** Sections ++++++++++++++++++++++++++++++++++++++++++++++++
**
*SOLID SECTION, ELSET=Solid_part-1, Material=Rubber
**
** Pre-tension sections ++++++++++++++++++++++++++++++++++++
**
**
** Constraints +++++++++++++++++++++++++++++++++++++++++++++
**
**
** Surface interactions ++++++++++++++++++++++++++++++++++++
**
**
** Contact pairs +++++++++++++++++++++++++++++++++++++++++++
**
**
** Steps +++++++++++++++++++++++++++++++++++++++++++++++++++
**
**
** Step-1 ++++++++++++++++++++++++++++++++++++++++++++++++++
**
*Step
*Static
**
** Boundary conditions +++++++++++++++++++++++++++++++++++++
**
*Boundary, op=New
** Name: Disp_rot-1
*Boundary
BC, 1, 1, 0
BC, 2, 2, 0
BC, 3, 3, 0
** Name: Disp_rot-2
*Boundary
ZSYMM, 3, 3, 0
**
** Loads +++++++++++++++++++++++++++++++++++++++++++++++++++
**
*Dload, op=New
*Cload, op=New
** Name: Traction
*Cload
176, 2, 31.25
194, 2, 62.5
191, 2, 62.5
175, 2, 31.25
193, 2, 62.5
190, 2, 62.5
192, 2, 62.5
189, 2, 62.5
180, 2, 31.25
179, 2, 31.25
**
** History outputs +++++++++++++++++++++++++++++++++++++++++
**
*Node print, Nset=Vertex
U
**
** Field outputs +++++++++++++++++++++++++++++++++++++++++++
**
*Node file
RF, U
*El file
S, E
*NODE PRINT, NSET=Vertex,
U2
**
** End step ++++++++++++++++++++++++++++++++++++++++++++++++
**
*End step
