**
** Heading +++++++++++++++++++++++++++++++++++++++++++++++++
**
*Heading
Hash: PXJD0WWr, Date: 03/11/2021, Unit system: MM_TON_S_C
**
** Nodes +++++++++++++++++++++++++++++++++++++++++++++++++++
**
*Node
146, 2.09537008E+001, 3.61193793E+001, 0.00000000E+000
173, 4.38562060E+001, 4.75926768E+001, 2.42804006E+000
141, 0.00000000E+000, 3.30000000E+001, 0.00000000E+000
153, 2.54557190E+001, 4.04878281E+001, 5.00000000E+000
143, 0.00000000E+000, 2.20000000E+001, 5.00000000E+000
167, 3.47175736E+000, 7.98776812E+000, 2.50831473E+000
148, 9.61876875E+000, 3.62656952E+001, 0.00000000E+000
122, 3.20000000E+001, 2.93333333E+001, 0.00000000E+000
154, 3.70129463E+001, 4.65977722E+001, 5.00000000E+000
114, 4.80000000E+001, 4.40000000E+001, 5.00000000E+000
138, 3.60000000E+001, 5.60000000E+001, 5.00000000E+000
168, 8.74601414E+000, 4.20322623E+001, 2.48626207E+000
164, 1.80600159E+001, 2.26208039E+001, 2.46316851E+000
134, 2.40000000E+001, 5.20000000E+001, 0.00000000E+000
132, 4.80000000E+001, 5.20000000E+001, 5.00000000E+000
169, 3.13696021E+001, 4.86080544E+001, 2.53840785E+000
157, 2.08432151E+001, 3.11517267E+001, 5.00000000E+000
170, 4.45189945E+000, 3.72322627E+001, 2.46028868E+000
147, 6.62674176E+000, 2.71098856E+001, 0.00000000E+000
163, 2.72182683E+001, 3.45384338E+001, 2.49887755E+000
118, 4.80000000E+001, 6.00000000E+001, 5.00000000E+000
159, 1.90845875E+001, 4.34778201E+001, 2.67109429E+000
166, 5.28483970E+000, 2.17784515E+001, 2.44779759E+000
117, 4.80000000E+001, 6.00000000E+001, 0.00000000E+000
120, 0.00000000E+000, 4.40000000E+001, 5.00000000E+000
144, 0.00000000E+000, 3.30000000E+001, 5.00000000E+000
150, 3.05954569E+001, 4.02121212E+001, 0.00000000E+000
136, 1.20000000E+001, 4.80000000E+001, 5.00000000E+000
113, 4.80000000E+001, 4.40000000E+001, 0.00000000E+000
121, 4.00000000E+001, 3.66666667E+001, 0.00000000E+000
135, 3.60000000E+001, 5.60000000E+001, 0.00000000E+000
128, 2.40000000E+001, 2.20000000E+001, 5.00000000E+000
126, 4.00000000E+001, 3.66666667E+001, 5.00000000E+000
158, 4.76643994E+000, 2.94409727E+001, 2.49260088E+000
160, 4.07939404E+001, 4.27991164E+001, 2.51110444E+000
165, 3.44644327E+001, 3.83298303E+001, 2.39541083E+000
171, 2.37780893E+001, 2.81748473E+001, 2.59704880E+000
152, 1.14120467E+001, 2.54817497E+001, 5.00000000E+000
125, 8.00000000E+000, 7.33333333E+000, 0.00000000E+000
115, 0.00000000E+000, 0.00000000E+000, 0.00000000E+000
156, 7.18583363E+000, 1.63755603E+001, 5.00000000E+000
124, 1.60000000E+001, 1.46666667E+001, 0.00000000E+000
140, 0.00000000E+000, 2.20000000E+001, 0.00000000E+000
130, 8.00000000E+000, 7.33333333E+000, 5.00000000E+000
131, 4.80000000E+001, 5.20000000E+001, 0.00000000E+000
149, 7.75803049E+000, 1.77958694E+001, 0.00000000E+000
172, 1.24811499E+001, 1.89365467E+001, 2.48863765E+000
161, 4.39936509E+000, 1.43227369E+001, 2.48867682E+000
142, 0.00000000E+000, 1.10000000E+001, 5.00000000E+000
133, 1.20000000E+001, 4.80000000E+001, 0.00000000E+000
139, 0.00000000E+000, 1.10000000E+001, 0.00000000E+000
116, 0.00000000E+000, 0.00000000E+000, 5.00000000E+000
155, 1.14282753E+001, 3.72312650E+001, 5.00000000E+000
145, 3.80065203E+001, 4.67331437E+001, 0.00000000E+000
129, 1.60000000E+001, 1.46666667E+001, 5.00000000E+000
151, 1.49260331E+001, 2.57682734E+001, 0.00000000E+000
174, 9.79014731E+000, 1.41780234E+001, 2.49064206E+000
162, 4.16500458E+001, 5.27550519E+001, 2.48413971E+000
137, 2.40000000E+001, 5.20000000E+001, 5.00000000E+000
119, 0.00000000E+000, 4.40000000E+001, 0.00000000E+000
123, 2.40000000E+001, 2.20000000E+001, 0.00000000E+000
127, 3.20000000E+001, 2.93333333E+001, 5.00000000E+000
**
** Elements ++++++++++++++++++++++++++++++++++++++++++++++++
**
*Element, Type=C3D4, Elset=Solid_part-1
190, 169, 162, 135, 138
191, 150, 153, 159, 146
192, 144, 140, 141, 158
193, 144, 170, 155, 158
194, 159, 155, 148, 146
195, 169, 138, 135, 134
196, 152, 157, 148, 155
197, 126, 165, 160, 121
198, 159, 136, 168, 155
199, 155, 144, 120, 170
200, 134, 169, 138, 137
201, 160, 114, 154, 126
202, 161, 166, 140, 143
203, 145, 169, 134, 150
204, 157, 152, 148, 151
205, 122, 127, 165, 163
206, 154, 132, 162, 138
207, 157, 148, 146, 151
208, 146, 148, 157, 155
209, 152, 155, 148, 158
210, 122, 146, 171, 163
211, 146, 163, 153, 157
212, 150, 146, 159, 134
213, 122, 121, 165, 127
214, 118, 117, 131, 162
215, 165, 126, 160, 154
216, 121, 165, 127, 126
217, 152, 147, 151, 149
218, 139, 125, 167, 115
219, 174, 156, 130, 129
220, 161, 143, 140, 139
221, 127, 122, 171, 163
222, 127, 163, 171, 157
223, 146, 155, 157, 153
224, 153, 126, 127, 165
225, 131, 132, 173, 113
226, 157, 127, 163, 153
227, 167, 125, 130, 115
228, 154, 126, 153, 165
229, 136, 119, 133, 168
230, 159, 146, 148, 133
231, 172, 151, 124, 149
232, 141, 119, 144, 170
233, 144, 119, 120, 170
234, 174, 149, 124, 125
235, 123, 124, 129, 164
236, 128, 152, 157, 164
237, 120, 119, 136, 168
238, 123, 128, 171, 164
239, 146, 134, 133, 159
240, 129, 152, 128, 164
241, 124, 172, 129, 164
242, 123, 164, 129, 128
243, 173, 132, 131, 162
244, 156, 129, 174, 172
245, 161, 130, 174, 156
246, 159, 133, 168, 136
247, 153, 159, 137, 169
248, 174, 172, 124, 149
249, 155, 152, 144, 158
250, 124, 125, 130, 174
251, 143, 152, 156, 166
252, 163, 146, 150, 122
253, 131, 135, 145, 162
254, 155, 120, 136, 168
255, 166, 156, 143, 161
256, 159, 136, 155, 153
257, 143, 140, 144, 158
258, 160, 114, 126, 113
259, 160, 126, 121, 113
260, 161, 125, 139, 149
261, 118, 162, 131, 132
262, 139, 125, 161, 167
263, 130, 167, 161, 125
264, 139, 161, 143, 142
265, 174, 129, 124, 172
266, 117, 135, 131, 162
267, 154, 114, 173, 132
268, 124, 174, 130, 129
269, 130, 167, 115, 116
270, 144, 152, 143, 158
271, 134, 137, 133, 159
272, 152, 166, 149, 156
273, 133, 137, 136, 159
274, 132, 114, 173, 113
275, 171, 151, 146, 123
276, 153, 165, 163, 150
277, 141, 170, 144, 158
278, 158, 140, 141, 147
279, 152, 158, 148, 147
280, 152, 147, 148, 151
281, 143, 166, 140, 158
282, 158, 152, 143, 166
283, 141, 148, 158, 147
284, 159, 153, 155, 146
285, 150, 134, 159, 169
286, 137, 159, 134, 169
287, 159, 137, 136, 153
288, 145, 160, 165, 121
289, 160, 154, 173, 145
290, 145, 121, 165, 150
291, 160, 145, 173, 113
292, 145, 160, 121, 113
293, 124, 172, 164, 151
294, 140, 166, 147, 158
295, 161, 156, 174, 149
296, 161, 149, 174, 125
297, 161, 156, 143, 142
298, 118, 117, 162, 138
299, 122, 150, 165, 121
300, 150, 169, 159, 153
301, 118, 138, 162, 132
302, 117, 135, 162, 138
303, 122, 128, 171, 123
304, 127, 157, 171, 128
305, 122, 123, 171, 146
306, 156, 172, 174, 149
307, 163, 146, 153, 150
308, 123, 124, 164, 151
309, 161, 125, 174, 130
310, 169, 134, 135, 145
311, 169, 145, 135, 162
312, 154, 132, 173, 162
313, 145, 173, 131, 162
314, 158, 152, 166, 147
315, 145, 150, 165, 154
316, 145, 154, 165, 160
317, 122, 163, 165, 150
318, 153, 165, 127, 163
319, 154, 165, 153, 150
320, 161, 139, 140, 149
321, 161, 149, 140, 166
322, 166, 152, 149, 147
323, 149, 156, 166, 161
324, 149, 140, 166, 147
325, 139, 167, 142, 115
326, 115, 167, 142, 116
327, 139, 167, 161, 142
328, 130, 156, 161, 142
329, 130, 142, 161, 167
330, 131, 173, 145, 113
331, 164, 152, 157, 151
332, 123, 164, 171, 151
333, 154, 173, 145, 162
334, 159, 168, 148, 155
335, 168, 119, 133, 148
336, 168, 148, 170, 119
337, 159, 133, 148, 168
338, 168, 119, 170, 120
339, 142, 167, 130, 116
340, 160, 114, 173, 154
341, 162, 138, 169, 154
342, 169, 154, 138, 137
343, 145, 154, 169, 150
344, 169, 154, 153, 150
345, 154, 169, 153, 137
346, 145, 162, 169, 154
347, 170, 148, 155, 158
348, 168, 120, 170, 155
349, 141, 119, 170, 148
350, 168, 155, 170, 148
351, 141, 148, 170, 158
352, 171, 128, 157, 164
353, 157, 151, 146, 171
354, 146, 163, 157, 171
355, 127, 128, 171, 122
356, 171, 164, 157, 151
357, 152, 151, 172, 149
358, 172, 152, 129, 164
359, 156, 152, 172, 149
360, 156, 129, 172, 152
361, 172, 152, 164, 151
362, 160, 113, 173, 114
**
** Node sets +++++++++++++++++++++++++++++++++++++++++++++++
**
*Nset, Nset=BC
115, 116, 119, 120, 139, 140, 141, 142, 143, 144
*Nset, Nset=Vertex
118
*Nset, Nset=Load
113, 114, 117, 118, 131, 132
*Nset, Nset=ZSYMM
113, 114, 115, 116, 117, 118, 119, 120, 121, 122, 123, 124, 125, 126, 127, 128,
129, 130, 131, 132, 133, 134, 135, 136, 137, 138, 139, 140, 141, 142, 143, 144,
145, 146, 147, 148, 149, 150, 151, 152, 153, 154, 155, 156, 157
*Nset, Nset=Internal-1_Internal_Selection-1_Traction
118, 131, 117, 132, 113, 114
**
** Element sets ++++++++++++++++++++++++++++++++++++++++++++
**
*Elset, Elset=C3D4
190, 191, 192, 193, 194, 195, 196, 197, 198, 199, 200, 201, 202, 203, 204, 205,
206, 207, 208, 209, 210, 211, 212, 213, 214, 215, 216, 217, 218, 219, 220, 221,
222, 223, 224, 225, 226, 227, 228, 229, 230, 231, 232, 233, 234, 235, 236, 237,
238, 239, 240, 241, 242, 243, 244, 245, 246, 247, 248, 249, 250, 251, 252, 253,
254, 255, 256, 257, 258, 259, 260, 261, 262, 263, 264, 265, 266, 267, 268, 269,
270, 271, 272, 273, 274, 275, 276, 277, 278, 279, 280, 281, 282, 283, 284, 285,
286, 287, 288, 289, 290, 291, 292, 293, 294, 295, 296, 297, 298, 299, 300, 301,
302, 303, 304, 305, 306, 307, 308, 309, 310, 311, 312, 313, 314, 315, 316, 317,
318, 319, 320, 321, 322, 323, 324, 325, 326, 327, 328, 329, 330, 331, 332, 333,
334, 335, 336, 337, 338, 339, 340, 341, 342, 343, 344, 345, 346, 347, 348, 349,
350, 351, 352, 353, 354, 355, 356, 357, 358, 359, 360, 361, 362
*Elset, Elset=Internal-1_Internal_Selection-1_Traction_S1
214
*Elset, Elset=Internal-2_Internal_Selection-1_Traction_S2
225, 274
*Elset, Elset=Internal-3_Internal_Selection-1_Traction_S4
261
**
** Surfaces ++++++++++++++++++++++++++++++++++++++++++++++++
**
*Surface, Name=Internal_Selection-1_Traction, Type=Element
Internal-1_Internal_Selection-1_Traction_S1, S1
Internal-2_Internal_Selection-1_Traction_S2, S2
Internal-3_Internal_Selection-1_Traction_S4, S4
**
** Materials +++++++++++++++++++++++++++++++++++++++++++++++
**
** Name: Material-1: Deactivated
*Material, Name=Rubber
*Elastic,
70.0, 0.4999
**
** Sections ++++++++++++++++++++++++++++++++++++++++++++++++
**
*SOLID SECTION, ELSET=Solid_part-1, Material=Rubber
**
** Pre-tension sections ++++++++++++++++++++++++++++++++++++
**
**
** Constraints +++++++++++++++++++++++++++++++++++++++++++++
**
**
** Surface interactions ++++++++++++++++++++++++++++++++++++
**
**
** Contact pairs +++++++++++++++++++++++++++++++++++++++++++
**
**
** Steps +++++++++++++++++++++++++++++++++++++++++++++++++++
**
**
** Step-1 ++++++++++++++++++++++++++++++++++++++++++++++++++
**
*Step
*Static
**
** Boundary conditions +++++++++++++++++++++++++++++++++++++
**
*Boundary, op=New
** Name: Disp_rot-1
*Boundary
BC, 1, 1, 0
BC, 2, 2, 0
BC, 3, 3, 0
** Name: Disp_rot-2
*Boundary
ZSYMM, 3, 3, 0
**
** Loads +++++++++++++++++++++++++++++++++++++++++++++++++++
**
*Dload, op=New
*Cload, op=New
** Name: Traction
*Cload
118, 2, 83.3333333333333
117, 2, 41.6666666666667
131, 2, 125
113, 2, 83.3333333333333
132, 2, 125
114, 2, 41.6666666666667
**
** History outputs +++++++++++++++++++++++++++++++++++++++++
**
*Node print, Nset=Vertex
U
**
** Field outputs +++++++++++++++++++++++++++++++++++++++++++
**
*Node file
RF, U
*El file
S, E
*NODE PRINT, NSET=Vertex,
U2
**
** End step ++++++++++++++++++++++++++++++++++++++++++++++++
**
*End step
