**
** Heading +++++++++++++++++++++++++++++++++++++++++++++++++
**
*Heading
Hash: PXJD0WWr, Date: 03/11/2021, Unit system: MM_TON_S_C
**
** Nodes +++++++++++++++++++++++++++++++++++++++++++++++++++
**
*Node
279, 1.80000000E+001, 1.65000000E+001, 0.00000000E+000
244, 4.80000000E+001, 4.80000000E+001, 5.00000000E+000
276, 0.00000000E+000, 0.00000000E+000, 2.50000000E+000
281, 4.20000000E+001, 3.85000000E+001, 5.00000000E+000
227, 0.00000000E+000, 0.00000000E+000, 0.00000000E+000
269, 2.40000000E+001, 2.95000000E+001, 5.00000000E+000
267, 1.20000000E+001, 2.95000000E+001, 5.00000000E+000
228, 0.00000000E+000, 0.00000000E+000, 5.00000000E+000
260, 2.40000000E+001, 2.95000000E+001, 0.00000000E+000
252, 0.00000000E+000, 2.20000000E+001, 0.00000000E+000
283, 1.80000000E+001, 1.65000000E+001, 5.00000000E+000
242, 4.80000000E+001, 5.60000000E+001, 5.00000000E+000
233, 3.60000000E+001, 3.30000000E+001, 0.00000000E+000
247, 3.60000000E+001, 5.60000000E+001, 0.00000000E+000
255, 0.00000000E+000, 2.20000000E+001, 5.00000000E+000
286, 4.80000000E+001, 5.80000000E+001, 0.00000000E+000
251, 0.00000000E+000, 1.10000000E+001, 0.00000000E+000
259, 3.60000000E+001, 5.02500000E+001, 0.00000000E+000
236, 3.60000000E+001, 3.30000000E+001, 5.00000000E+000
232, 0.00000000E+000, 4.40000000E+001, 5.00000000E+000
235, 1.20000000E+001, 1.10000000E+001, 0.00000000E+000
280, 6.00000000E+000, 5.50000000E+000, 0.00000000E+000
268, 1.20000000E+001, 3.87500000E+001, 5.00000000E+000
256, 0.00000000E+000, 3.30000000E+001, 5.00000000E+000
248, 1.20000000E+001, 4.80000000E+001, 5.00000000E+000
278, 3.00000000E+001, 2.75000000E+001, 0.00000000E+000
282, 3.00000000E+001, 2.75000000E+001, 5.00000000E+000
240, 4.80000000E+001, 5.20000000E+001, 0.00000000E+000
254, 0.00000000E+000, 1.10000000E+001, 5.00000000E+000
238, 1.20000000E+001, 1.10000000E+001, 5.00000000E+000
284, 6.00000000E+000, 5.50000000E+000, 5.00000000E+000
234, 2.40000000E+001, 2.20000000E+001, 0.00000000E+000
237, 2.40000000E+001, 2.20000000E+001, 5.00000000E+000
275, 4.80000000E+001, 4.40000000E+001, 2.50000000E+000
241, 4.80000000E+001, 4.80000000E+001, 0.00000000E+000
239, 4.80000000E+001, 5.60000000E+001, 0.00000000E+000
245, 1.20000000E+001, 4.80000000E+001, 0.00000000E+000
249, 2.40000000E+001, 5.20000000E+001, 5.00000000E+000
262, 2.40000000E+001, 4.45000000E+001, 0.00000000E+000
265, 1.20000000E+001, 3.87500000E+001, 0.00000000E+000
243, 4.80000000E+001, 5.20000000E+001, 5.00000000E+000
258, 3.60000000E+001, 4.45000000E+001, 0.00000000E+000
277, 4.20000000E+001, 3.85000000E+001, 0.00000000E+000
253, 0.00000000E+000, 3.30000000E+001, 0.00000000E+000
246, 2.40000000E+001, 5.20000000E+001, 0.00000000E+000
270, 2.40000000E+001, 3.70000000E+001, 5.00000000E+000
226, 4.80000000E+001, 4.40000000E+001, 5.00000000E+000
264, 1.20000000E+001, 2.95000000E+001, 0.00000000E+000
274, 3.60000000E+001, 5.02500000E+001, 5.00000000E+000
225, 4.80000000E+001, 4.40000000E+001, 0.00000000E+000
266, 1.20000000E+001, 2.02500000E+001, 5.00000000E+000
273, 3.60000000E+001, 4.45000000E+001, 5.00000000E+000
263, 1.20000000E+001, 2.02500000E+001, 0.00000000E+000
229, 4.80000000E+001, 6.00000000E+001, 0.00000000E+000
271, 2.40000000E+001, 4.45000000E+001, 5.00000000E+000
231, 0.00000000E+000, 4.40000000E+001, 0.00000000E+000
261, 2.40000000E+001, 3.70000000E+001, 0.00000000E+000
285, 4.80000000E+001, 6.00000000E+001, 2.50000000E+000
250, 3.60000000E+001, 5.60000000E+001, 5.00000000E+000
272, 3.60000000E+001, 3.87500000E+001, 5.00000000E+000
257, 3.60000000E+001, 3.87500000E+001, 0.00000000E+000
230, 4.80000000E+001, 6.00000000E+001, 5.00000000E+000
287, 4.80000000E+001, 5.40000000E+001, 0.00000000E+000
288, 4.80000000E+001, 5.00000000E+001, 0.00000000E+000
289, 4.80000000E+001, 4.60000000E+001, 0.00000000E+000
290, 4.80000000E+001, 5.80000000E+001, 5.00000000E+000
291, 4.80000000E+001, 5.40000000E+001, 5.00000000E+000
292, 4.80000000E+001, 5.00000000E+001, 5.00000000E+000
293, 4.80000000E+001, 4.60000000E+001, 5.00000000E+000
294, 0.00000000E+000, 4.40000000E+001, 2.50000000E+000
295, 6.00000000E+000, 4.60000000E+001, 0.00000000E+000
296, 1.80000000E+001, 5.00000000E+001, 0.00000000E+000
297, 3.00000000E+001, 5.40000000E+001, 0.00000000E+000
298, 4.20000000E+001, 5.80000000E+001, 0.00000000E+000
299, 6.00000000E+000, 4.60000000E+001, 5.00000000E+000
300, 1.80000000E+001, 5.00000000E+001, 5.00000000E+000
301, 3.00000000E+001, 5.40000000E+001, 5.00000000E+000
302, 4.20000000E+001, 5.80000000E+001, 5.00000000E+000
303, 0.00000000E+000, 5.50000000E+000, 0.00000000E+000
304, 0.00000000E+000, 1.65000000E+001, 0.00000000E+000
305, 0.00000000E+000, 2.75000000E+001, 0.00000000E+000
306, 0.00000000E+000, 3.85000000E+001, 0.00000000E+000
307, 0.00000000E+000, 5.50000000E+000, 5.00000000E+000
308, 0.00000000E+000, 1.65000000E+001, 5.00000000E+000
309, 0.00000000E+000, 2.75000000E+001, 5.00000000E+000
310, 0.00000000E+000, 3.85000000E+001, 5.00000000E+000
311, 3.60000000E+001, 3.30000000E+001, 2.50000000E+000
312, 2.40000000E+001, 2.20000000E+001, 2.50000000E+000
313, 1.20000000E+001, 1.10000000E+001, 2.50000000E+000
314, 4.80000000E+001, 5.60000000E+001, 2.50000000E+000
315, 4.80000000E+001, 5.20000000E+001, 2.50000000E+000
316, 4.80000000E+001, 4.80000000E+001, 2.50000000E+000
317, 1.20000000E+001, 4.80000000E+001, 2.50000000E+000
318, 2.40000000E+001, 5.20000000E+001, 2.50000000E+000
319, 3.60000000E+001, 5.60000000E+001, 2.50000000E+000
320, 0.00000000E+000, 1.10000000E+001, 2.50000000E+000
321, 0.00000000E+000, 2.20000000E+001, 2.50000000E+000
322, 0.00000000E+000, 3.30000000E+001, 2.50000000E+000
323, 3.60000000E+001, 3.58750000E+001, 0.00000000E+000
324, 4.20000000E+001, 4.33750000E+001, 0.00000000E+000
325, 3.60000000E+001, 4.16250000E+001, 0.00000000E+000
326, 4.20000000E+001, 4.82500000E+001, 0.00000000E+000
327, 3.60000000E+001, 4.73750000E+001, 0.00000000E+000
328, 4.20000000E+001, 5.31250000E+001, 0.00000000E+000
329, 3.60000000E+001, 5.31250000E+001, 0.00000000E+000
330, 2.40000000E+001, 2.57500000E+001, 0.00000000E+000
331, 3.00000000E+001, 3.41250000E+001, 0.00000000E+000
332, 2.40000000E+001, 3.32500000E+001, 0.00000000E+000
333, 3.00000000E+001, 4.07500000E+001, 0.00000000E+000
334, 2.40000000E+001, 4.07500000E+001, 0.00000000E+000
335, 3.00000000E+001, 4.73750000E+001, 0.00000000E+000
336, 2.40000000E+001, 4.82500000E+001, 0.00000000E+000
337, 1.20000000E+001, 1.56250000E+001, 0.00000000E+000
338, 1.80000000E+001, 2.48750000E+001, 0.00000000E+000
339, 1.20000000E+001, 2.48750000E+001, 0.00000000E+000
340, 1.80000000E+001, 3.32500000E+001, 0.00000000E+000
341, 1.20000000E+001, 3.41250000E+001, 0.00000000E+000
342, 1.80000000E+001, 4.16250000E+001, 0.00000000E+000
343, 1.20000000E+001, 4.33750000E+001, 0.00000000E+000
344, 6.00000000E+000, 1.56250000E+001, 0.00000000E+000
345, 6.00000000E+000, 2.57500000E+001, 0.00000000E+000
346, 6.00000000E+000, 3.58750000E+001, 0.00000000E+000
347, 1.20000000E+001, 1.56250000E+001, 5.00000000E+000
348, 6.00000000E+000, 1.56250000E+001, 5.00000000E+000
349, 1.20000000E+001, 2.48750000E+001, 5.00000000E+000
350, 6.00000000E+000, 2.57500000E+001, 5.00000000E+000
351, 1.20000000E+001, 3.41250000E+001, 5.00000000E+000
352, 6.00000000E+000, 3.58750000E+001, 5.00000000E+000
353, 1.20000000E+001, 4.33750000E+001, 5.00000000E+000
354, 2.40000000E+001, 2.57500000E+001, 5.00000000E+000
355, 1.80000000E+001, 2.48750000E+001, 5.00000000E+000
356, 2.40000000E+001, 3.32500000E+001, 5.00000000E+000
357, 1.80000000E+001, 3.32500000E+001, 5.00000000E+000
358, 2.40000000E+001, 4.07500000E+001, 5.00000000E+000
359, 1.80000000E+001, 4.16250000E+001, 5.00000000E+000
360, 2.40000000E+001, 4.82500000E+001, 5.00000000E+000
361, 3.60000000E+001, 3.58750000E+001, 5.00000000E+000
362, 3.00000000E+001, 3.41250000E+001, 5.00000000E+000
363, 3.60000000E+001, 4.16250000E+001, 5.00000000E+000
364, 3.00000000E+001, 4.07500000E+001, 5.00000000E+000
365, 3.60000000E+001, 4.73750000E+001, 5.00000000E+000
366, 3.00000000E+001, 4.73750000E+001, 5.00000000E+000
367, 3.60000000E+001, 5.31250000E+001, 5.00000000E+000
368, 4.20000000E+001, 4.33750000E+001, 5.00000000E+000
369, 4.20000000E+001, 4.82500000E+001, 5.00000000E+000
370, 4.20000000E+001, 5.31250000E+001, 5.00000000E+000
371, 3.60000000E+001, 3.87500000E+001, 2.50000000E+000
372, 3.60000000E+001, 4.45000000E+001, 2.50000000E+000
373, 3.60000000E+001, 5.02500000E+001, 2.50000000E+000
374, 2.40000000E+001, 2.95000000E+001, 2.50000000E+000
375, 2.40000000E+001, 3.70000000E+001, 2.50000000E+000
376, 2.40000000E+001, 4.45000000E+001, 2.50000000E+000
377, 1.20000000E+001, 2.02500000E+001, 2.50000000E+000
378, 1.20000000E+001, 2.95000000E+001, 2.50000000E+000
379, 1.20000000E+001, 3.87500000E+001, 2.50000000E+000
**
** Elements ++++++++++++++++++++++++++++++++++++++++++++++++
**
*Element, Type=C3D20, Elset=Solid_part-1
379, 226, 225, 233, 236, 244, 241, 257, 272, 275, 277, 311, 281, 316, 324, 371
368, 293, 289, 323, 361
380, 244, 241, 257, 272, 243, 240, 258, 273, 316, 324, 371, 368, 315, 326, 372
369, 292, 288, 325, 363
381, 243, 240, 258, 273, 242, 239, 259, 274, 315, 326, 372, 369, 314, 328, 373
370, 291, 287, 327, 365
382, 242, 239, 259, 274, 230, 229, 247, 250, 314, 328, 373, 370, 285, 298, 319
302, 290, 286, 329, 367
383, 236, 233, 234, 237, 272, 257, 260, 269, 311, 278, 312, 282, 371, 331, 374
362, 361, 323, 330, 354
384, 272, 257, 260, 269, 273, 258, 261, 270, 371, 331, 374, 362, 372, 333, 375
364, 363, 325, 332, 356
385, 273, 258, 261, 270, 274, 259, 262, 271, 372, 333, 375, 364, 373, 335, 376
366, 365, 327, 334, 358
386, 274, 259, 262, 271, 250, 247, 246, 249, 373, 335, 376, 366, 319, 297, 318
301, 367, 329, 336, 360
387, 237, 234, 235, 238, 269, 260, 263, 266, 312, 279, 313, 283, 374, 338, 377
355, 354, 330, 337, 347
388, 269, 260, 263, 266, 270, 261, 264, 267, 374, 338, 377, 355, 375, 340, 378
357, 356, 332, 339, 349
389, 270, 261, 264, 267, 271, 262, 265, 268, 375, 340, 378, 357, 376, 342, 379
359, 358, 334, 341, 351
390, 271, 262, 265, 268, 249, 246, 245, 248, 376, 342, 379, 359, 318, 296, 317
300, 360, 336, 343, 353
391, 238, 235, 227, 228, 266, 263, 251, 254, 313, 280, 276, 284, 377, 344, 320
348, 347, 337, 303, 307
392, 266, 263, 251, 254, 267, 264, 252, 255, 377, 344, 320, 348, 378, 345, 321
350, 349, 339, 304, 308
393, 267, 264, 252, 255, 268, 265, 253, 256, 378, 345, 321, 350, 379, 346, 322
352, 351, 341, 305, 309
394, 268, 265, 253, 256, 248, 245, 231, 232, 379, 346, 322, 352, 317, 295, 294
299, 353, 343, 306, 310
**
** Node sets +++++++++++++++++++++++++++++++++++++++++++++++
**
*Nset, Nset=BC
227, 228, 231, 232, 251, 252, 253, 254, 255, 256, 276, 294, 303, 304, 305, 306,
307, 308, 309, 310, 320, 321, 322
*Nset, Nset=Vertex
230
*Nset, Nset=Load
225, 226, 229, 230, 239, 240, 241, 242, 243, 244, 275, 285, 286, 287, 288, 289,
290, 291, 292, 293, 314, 315, 316
*Nset, Nset=ZSYMM
225, 226, 227, 228, 229, 230, 231, 232, 233, 234, 235, 236, 237, 238, 239, 240,
241, 242, 243, 244, 245, 246, 247, 248, 249, 250, 251, 252, 253, 254, 255, 256,
257, 258, 259, 260, 261, 262, 263, 264, 265, 266, 267, 268, 269, 270, 271, 272,
273, 274, 277, 278, 279, 280, 281, 282, 283, 284, 286, 287, 288, 289, 290, 291,
292, 293, 295, 296, 297, 298, 299, 300, 301, 302, 303, 304, 305, 306, 307, 308,
309, 310, 323, 324, 325, 326, 327, 328, 329, 330, 331, 332, 333, 334, 335, 336,
337, 338, 339, 340, 341, 342, 343, 344, 345, 346, 347, 348, 349, 350, 351, 352,
353, 354, 355, 356, 357, 358, 359, 360, 361, 362, 363, 364, 365, 366, 367, 368,
369, 370
*Nset, Nset=Internal-1_Internal_Selection-1_Traction
226, 225, 241, 244, 275, 289, 316, 293, 240, 243, 288, 315, 292, 239, 242, 287,
314, 291, 229, 230, 286, 285, 290
**
** Element sets ++++++++++++++++++++++++++++++++++++++++++++
**
*Elset, Elset=C3D20
379, 380, 381, 382, 383, 384, 385, 386, 387, 388, 389, 390, 391, 392, 393, 394
*Elset, Elset=Internal-1_Internal_Selection-1_Traction_S3
379, 380, 381, 382
**
** Surfaces ++++++++++++++++++++++++++++++++++++++++++++++++
**
*Surface, Name=Internal_Selection-1_Traction, Type=Element
Internal-1_Internal_Selection-1_Traction_S3, S3
**
** Materials +++++++++++++++++++++++++++++++++++++++++++++++
**
** Name: Material-1: Deactivated
*Material, Name=Rubber
*Elastic,
70.0, 0.4999
**
** Sections ++++++++++++++++++++++++++++++++++++++++++++++++
**
*SOLID SECTION, ELSET=Solid_part-1, Material=Rubber
**
** Pre-tension sections ++++++++++++++++++++++++++++++++++++
**
**
** Constraints +++++++++++++++++++++++++++++++++++++++++++++
**
**
** Surface interactions ++++++++++++++++++++++++++++++++++++
**
**
** Contact pairs +++++++++++++++++++++++++++++++++++++++++++
**
**
** Steps +++++++++++++++++++++++++++++++++++++++++++++++++++
**
**
** Step-1 ++++++++++++++++++++++++++++++++++++++++++++++++++
**
*Step
*Static
**
** Boundary conditions +++++++++++++++++++++++++++++++++++++
**
*Boundary, op=New
** Name: Disp_rot-1
*Boundary
BC, 1, 1, 0
BC, 2, 2, 0
BC, 3, 3, 0
** Name: Disp_rot-2
*Boundary
ZSYMM, 3, 3, 0
**
** Loads +++++++++++++++++++++++++++++++++++++++++++++++++++
**
*Dload, op=New
*Cload, op=New
** Name: Traction
*Cload
226, 2, -10.4166666666667
244, 2, -20.8333333333333
241, 2, -20.8333333333333
225, 2, -10.4166666666667
293, 2, 41.6666666666667
316, 2, 83.3333333333333
289, 2, 41.6666666666667
275, 2, 41.6666666666667
243, 2, -20.8333333333333
240, 2, -20.8333333333333
292, 2, 41.6666666666667
315, 2, 83.3333333333333
288, 2, 41.6666666666667
242, 2, -20.8333333333333
239, 2, -20.8333333333333
291, 2, 41.6666666666667
314, 2, 83.3333333333333
287, 2, 41.6666666666667
230, 2, -10.4166666666667
229, 2, -10.4166666666667
290, 2, 41.6666666666667
285, 2, 41.6666666666667
286, 2, 41.6666666666667
**
** History outputs +++++++++++++++++++++++++++++++++++++++++
**
*Node print, Nset=Vertex
U
**
** Field outputs +++++++++++++++++++++++++++++++++++++++++++
**
*Node file
RF, U
*El file
S, E
*NODE PRINT, NSET=Vertex,
U2
**
** End step ++++++++++++++++++++++++++++++++++++++++++++++++
**
*End step
