**
** Heading +++++++++++++++++++++++++++++++++++++++++++++++++
**
*Heading
Hash: PXJD0WWr, Date: 03/11/2021, Unit system: MM_TON_S_C
**
** Nodes +++++++++++++++++++++++++++++++++++++++++++++++++++
**
*Node
756, 1.20000000E+001, 4.80000000E+001, 0.00000000E+000
776, 0.00000000E+000, 5.50000000E+000, 5.00000000E+000
770, 0.00000000E+000, 1.10000000E+001, 0.00000000E+000
784, 4.20000000E+001, 4.33750000E+001, 0.00000000E+000
859, 2.40000000E+001, 4.82500000E+001, 5.00000000E+000
850, 1.80000000E+001, 3.74375000E+001, 5.00000000E+000
734, 4.20000000E+001, 3.85000000E+001, 5.00000000E+000
727, 4.20000000E+001, 3.85000000E+001, 0.00000000E+000
724, 4.80000000E+001, 6.00000000E+001, 5.00000000E+000
773, 0.00000000E+000, 2.75000000E+001, 0.00000000E+000
779, 0.00000000E+000, 2.20000000E+001, 5.00000000E+000
780, 0.00000000E+000, 2.75000000E+001, 5.00000000E+000
730, 2.40000000E+001, 2.20000000E+001, 0.00000000E+000
847, 1.80000000E+001, 2.48750000E+001, 5.00000000E+000
775, 0.00000000E+000, 3.85000000E+001, 0.00000000E+000
748, 4.80000000E+001, 5.80000000E+001, 5.00000000E+000
752, 4.80000000E+001, 5.00000000E+001, 5.00000000E+000
844, 1.20000000E+001, 3.87500000E+001, 5.00000000E+000
732, 1.20000000E+001, 1.10000000E+001, 0.00000000E+000
769, 0.00000000E+000, 5.50000000E+000, 0.00000000E+000
728, 3.60000000E+001, 3.30000000E+001, 0.00000000E+000
781, 0.00000000E+000, 3.30000000E+001, 5.00000000E+000
751, 4.80000000E+001, 5.20000000E+001, 5.00000000E+000
762, 6.00000000E+000, 4.60000000E+001, 5.00000000E+000
870, 3.60000000E+001, 4.45000000E+001, 5.00000000E+000
867, 3.60000000E+001, 3.58750000E+001, 5.00000000E+000
860, 3.00000000E+001, 3.08125000E+001, 5.00000000E+000
819, 1.20000000E+001, 2.02500000E+001, 0.00000000E+000
862, 3.00000000E+001, 3.74375000E+001, 5.00000000E+000
864, 3.00000000E+001, 4.40625000E+001, 5.00000000E+000
790, 3.60000000E+001, 3.58750000E+001, 0.00000000E+000
741, 4.80000000E+001, 5.80000000E+001, 0.00000000E+000
761, 4.20000000E+001, 5.80000000E+001, 0.00000000E+000
772, 0.00000000E+000, 2.20000000E+001, 0.00000000E+000
829, 6.00000000E+000, 3.08125000E+001, 0.00000000E+000
745, 4.80000000E+001, 5.00000000E+001, 0.00000000E+000
852, 1.80000000E+001, 4.58125000E+001, 5.00000000E+000
765, 2.40000000E+001, 5.20000000E+001, 5.00000000E+000
830, 6.00000000E+000, 3.58750000E+001, 0.00000000E+000
834, 6.00000000E+000, 2.06875000E+001, 5.00000000E+000
817, 1.80000000E+001, 4.58125000E+001, 0.00000000E+000
825, 6.00000000E+000, 1.05625000E+001, 0.00000000E+000
871, 3.60000000E+001, 4.73750000E+001, 5.00000000E+000
835, 6.00000000E+000, 2.57500000E+001, 5.00000000E+000
843, 1.20000000E+001, 3.41250000E+001, 5.00000000E+000
872, 3.60000000E+001, 5.02500000E+001, 5.00000000E+000
856, 2.40000000E+001, 3.70000000E+001, 5.00000000E+000
787, 4.20000000E+001, 5.06875000E+001, 0.00000000E+000
797, 3.00000000E+001, 3.08125000E+001, 0.00000000E+000
833, 6.00000000E+000, 1.56250000E+001, 5.00000000E+000
851, 1.80000000E+001, 4.16250000E+001, 5.00000000E+000
789, 4.20000000E+001, 5.55625000E+001, 0.00000000E+000
858, 2.40000000E+001, 4.45000000E+001, 5.00000000E+000
880, 4.20000000E+001, 5.55625000E+001, 5.00000000E+000
839, 1.20000000E+001, 1.56250000E+001, 5.00000000E+000
831, 6.00000000E+000, 4.09375000E+001, 0.00000000E+000
832, 6.00000000E+000, 1.05625000E+001, 5.00000000E+000
849, 1.80000000E+001, 3.32500000E+001, 5.00000000E+000
758, 2.40000000E+001, 5.20000000E+001, 0.00000000E+000
766, 3.00000000E+001, 5.40000000E+001, 5.00000000E+000
811, 1.80000000E+001, 2.06875000E+001, 0.00000000E+000
733, 6.00000000E+000, 5.50000000E+000, 0.00000000E+000
750, 4.80000000E+001, 5.40000000E+001, 5.00000000E+000
736, 3.00000000E+001, 2.75000000E+001, 5.00000000E+000
842, 1.20000000E+001, 2.95000000E+001, 5.00000000E+000
857, 2.40000000E+001, 4.07500000E+001, 5.00000000E+000
866, 3.00000000E+001, 5.06875000E+001, 5.00000000E+000
764, 1.80000000E+001, 5.00000000E+001, 5.00000000E+000
788, 4.20000000E+001, 5.31250000E+001, 0.00000000E+000
740, 6.00000000E+000, 5.50000000E+000, 5.00000000E+000
755, 6.00000000E+000, 4.60000000E+001, 0.00000000E+000
735, 3.60000000E+001, 3.30000000E+001, 5.00000000E+000
813, 1.80000000E+001, 2.90625000E+001, 0.00000000E+000
726, 0.00000000E+000, 4.40000000E+001, 5.00000000E+000
824, 1.20000000E+001, 4.33750000E+001, 0.00000000E+000
812, 1.80000000E+001, 2.48750000E+001, 0.00000000E+000
875, 4.20000000E+001, 4.33750000E+001, 5.00000000E+000
874, 4.20000000E+001, 4.09375000E+001, 5.00000000E+000
861, 3.00000000E+001, 3.41250000E+001, 5.00000000E+000
720, 4.80000000E+001, 4.40000000E+001, 5.00000000E+000
801, 3.00000000E+001, 4.40625000E+001, 0.00000000E+000
785, 4.20000000E+001, 4.58125000E+001, 0.00000000E+000
796, 3.60000000E+001, 5.31250000E+001, 0.00000000E+000
798, 3.00000000E+001, 3.41250000E+001, 0.00000000E+000
878, 4.20000000E+001, 5.06875000E+001, 5.00000000E+000
823, 1.20000000E+001, 3.87500000E+001, 0.00000000E+000
737, 2.40000000E+001, 2.20000000E+001, 5.00000000E+000
794, 3.60000000E+001, 4.73750000E+001, 0.00000000E+000
876, 4.20000000E+001, 4.58125000E+001, 5.00000000E+000
795, 3.60000000E+001, 5.02500000E+001, 0.00000000E+000
879, 4.20000000E+001, 5.31250000E+001, 5.00000000E+000
877, 4.20000000E+001, 4.82500000E+001, 5.00000000E+000
873, 3.60000000E+001, 5.31250000E+001, 5.00000000E+000
868, 3.60000000E+001, 3.87500000E+001, 5.00000000E+000
869, 3.60000000E+001, 4.16250000E+001, 5.00000000E+000
865, 3.00000000E+001, 4.73750000E+001, 5.00000000E+000
863, 3.00000000E+001, 4.07500000E+001, 5.00000000E+000
854, 2.40000000E+001, 2.95000000E+001, 5.00000000E+000
855, 2.40000000E+001, 3.32500000E+001, 5.00000000E+000
853, 2.40000000E+001, 2.57500000E+001, 5.00000000E+000
846, 1.80000000E+001, 2.06875000E+001, 5.00000000E+000
848, 1.80000000E+001, 2.90625000E+001, 5.00000000E+000
845, 1.20000000E+001, 4.33750000E+001, 5.00000000E+000
841, 1.20000000E+001, 2.48750000E+001, 5.00000000E+000
840, 1.20000000E+001, 2.02500000E+001, 5.00000000E+000
837, 6.00000000E+000, 3.58750000E+001, 5.00000000E+000
838, 6.00000000E+000, 4.09375000E+001, 5.00000000E+000
836, 6.00000000E+000, 3.08125000E+001, 5.00000000E+000
828, 6.00000000E+000, 2.57500000E+001, 0.00000000E+000
826, 6.00000000E+000, 1.56250000E+001, 0.00000000E+000
827, 6.00000000E+000, 2.06875000E+001, 0.00000000E+000
822, 1.20000000E+001, 3.41250000E+001, 0.00000000E+000
820, 1.20000000E+001, 2.48750000E+001, 0.00000000E+000
821, 1.20000000E+001, 2.95000000E+001, 0.00000000E+000
818, 1.20000000E+001, 1.56250000E+001, 0.00000000E+000
815, 1.80000000E+001, 3.74375000E+001, 0.00000000E+000
816, 1.80000000E+001, 4.16250000E+001, 0.00000000E+000
814, 1.80000000E+001, 3.32500000E+001, 0.00000000E+000
810, 2.40000000E+001, 4.82500000E+001, 0.00000000E+000
809, 2.40000000E+001, 4.45000000E+001, 0.00000000E+000
808, 2.40000000E+001, 4.07500000E+001, 0.00000000E+000
807, 2.40000000E+001, 3.70000000E+001, 0.00000000E+000
806, 2.40000000E+001, 3.32500000E+001, 0.00000000E+000
804, 2.40000000E+001, 2.57500000E+001, 0.00000000E+000
805, 2.40000000E+001, 2.95000000E+001, 0.00000000E+000
803, 3.00000000E+001, 5.06875000E+001, 0.00000000E+000
802, 3.00000000E+001, 4.73750000E+001, 0.00000000E+000
800, 3.00000000E+001, 4.07500000E+001, 0.00000000E+000
799, 3.00000000E+001, 3.74375000E+001, 0.00000000E+000
792, 3.60000000E+001, 4.16250000E+001, 0.00000000E+000
793, 3.60000000E+001, 4.45000000E+001, 0.00000000E+000
791, 3.60000000E+001, 3.87500000E+001, 0.00000000E+000
786, 4.20000000E+001, 4.82500000E+001, 0.00000000E+000
783, 4.20000000E+001, 4.09375000E+001, 0.00000000E+000
782, 0.00000000E+000, 3.85000000E+001, 5.00000000E+000
778, 0.00000000E+000, 1.65000000E+001, 5.00000000E+000
777, 0.00000000E+000, 1.10000000E+001, 5.00000000E+000
774, 0.00000000E+000, 3.30000000E+001, 0.00000000E+000
771, 0.00000000E+000, 1.65000000E+001, 0.00000000E+000
767, 3.60000000E+001, 5.60000000E+001, 5.00000000E+000
768, 4.20000000E+001, 5.80000000E+001, 5.00000000E+000
763, 1.20000000E+001, 4.80000000E+001, 5.00000000E+000
760, 3.60000000E+001, 5.60000000E+001, 0.00000000E+000
759, 3.00000000E+001, 5.40000000E+001, 0.00000000E+000
757, 1.80000000E+001, 5.00000000E+001, 0.00000000E+000
754, 4.80000000E+001, 4.60000000E+001, 5.00000000E+000
753, 4.80000000E+001, 4.80000000E+001, 5.00000000E+000
749, 4.80000000E+001, 5.60000000E+001, 5.00000000E+000
746, 4.80000000E+001, 4.80000000E+001, 0.00000000E+000
747, 4.80000000E+001, 4.60000000E+001, 0.00000000E+000
744, 4.80000000E+001, 5.20000000E+001, 0.00000000E+000
742, 4.80000000E+001, 5.60000000E+001, 0.00000000E+000
743, 4.80000000E+001, 5.40000000E+001, 0.00000000E+000
739, 1.20000000E+001, 1.10000000E+001, 5.00000000E+000
738, 1.80000000E+001, 1.65000000E+001, 5.00000000E+000
731, 1.80000000E+001, 1.65000000E+001, 0.00000000E+000
729, 3.00000000E+001, 2.75000000E+001, 0.00000000E+000
725, 0.00000000E+000, 4.40000000E+001, 0.00000000E+000
722, 0.00000000E+000, 0.00000000E+000, 5.00000000E+000
723, 4.80000000E+001, 6.00000000E+001, 0.00000000E+000
721, 0.00000000E+000, 0.00000000E+000, 0.00000000E+000
719, 4.80000000E+001, 4.40000000E+001, 0.00000000E+000
**
** Elements ++++++++++++++++++++++++++++++++++++++++++++++++
**
*Element, Type=C3D8, Elset=Solid_part-1
568, 720, 719, 727, 734, 754, 747, 783, 874
569, 754, 747, 783, 874, 753, 746, 784, 875
570, 753, 746, 784, 875, 752, 745, 785, 876
571, 752, 745, 785, 876, 751, 744, 786, 877
572, 751, 744, 786, 877, 750, 743, 787, 878
573, 750, 743, 787, 878, 749, 742, 788, 879
574, 749, 742, 788, 879, 748, 741, 789, 880
575, 748, 741, 789, 880, 724, 723, 761, 768
576, 734, 727, 728, 735, 874, 783, 790, 867
577, 874, 783, 790, 867, 875, 784, 791, 868
578, 875, 784, 791, 868, 876, 785, 792, 869
579, 876, 785, 792, 869, 877, 786, 793, 870
580, 877, 786, 793, 870, 878, 787, 794, 871
581, 878, 787, 794, 871, 879, 788, 795, 872
582, 879, 788, 795, 872, 880, 789, 796, 873
583, 880, 789, 796, 873, 768, 761, 760, 767
584, 735, 728, 729, 736, 867, 790, 797, 860
585, 867, 790, 797, 860, 868, 791, 798, 861
586, 868, 791, 798, 861, 869, 792, 799, 862
587, 869, 792, 799, 862, 870, 793, 800, 863
588, 870, 793, 800, 863, 871, 794, 801, 864
589, 871, 794, 801, 864, 872, 795, 802, 865
590, 872, 795, 802, 865, 873, 796, 803, 866
591, 873, 796, 803, 866, 767, 760, 759, 766
592, 736, 729, 730, 737, 860, 797, 804, 853
593, 860, 797, 804, 853, 861, 798, 805, 854
594, 861, 798, 805, 854, 862, 799, 806, 855
595, 862, 799, 806, 855, 863, 800, 807, 856
596, 863, 800, 807, 856, 864, 801, 808, 857
597, 864, 801, 808, 857, 865, 802, 809, 858
598, 865, 802, 809, 858, 866, 803, 810, 859
599, 866, 803, 810, 859, 766, 759, 758, 765
600, 737, 730, 731, 738, 853, 804, 811, 846
601, 853, 804, 811, 846, 854, 805, 812, 847
602, 854, 805, 812, 847, 855, 806, 813, 848
603, 855, 806, 813, 848, 856, 807, 814, 849
604, 856, 807, 814, 849, 857, 808, 815, 850
605, 857, 808, 815, 850, 858, 809, 816, 851
606, 858, 809, 816, 851, 859, 810, 817, 852
607, 859, 810, 817, 852, 765, 758, 757, 764
608, 738, 731, 732, 739, 846, 811, 818, 839
609, 846, 811, 818, 839, 847, 812, 819, 840
610, 847, 812, 819, 840, 848, 813, 820, 841
611, 848, 813, 820, 841, 849, 814, 821, 842
612, 849, 814, 821, 842, 850, 815, 822, 843
613, 850, 815, 822, 843, 851, 816, 823, 844
614, 851, 816, 823, 844, 852, 817, 824, 845
615, 852, 817, 824, 845, 764, 757, 756, 763
616, 739, 732, 733, 740, 839, 818, 825, 832
617, 839, 818, 825, 832, 840, 819, 826, 833
618, 840, 819, 826, 833, 841, 820, 827, 834
619, 841, 820, 827, 834, 842, 821, 828, 835
620, 842, 821, 828, 835, 843, 822, 829, 836
621, 843, 822, 829, 836, 844, 823, 830, 837
622, 844, 823, 830, 837, 845, 824, 831, 838
623, 845, 824, 831, 838, 763, 756, 755, 762
624, 740, 733, 721, 722, 832, 825, 769, 776
625, 832, 825, 769, 776, 833, 826, 770, 777
626, 833, 826, 770, 777, 834, 827, 771, 778
627, 834, 827, 771, 778, 835, 828, 772, 779
628, 835, 828, 772, 779, 836, 829, 773, 780
629, 836, 829, 773, 780, 837, 830, 774, 781
630, 837, 830, 774, 781, 838, 831, 775, 782
631, 838, 831, 775, 782, 762, 755, 725, 726
**
** Node sets +++++++++++++++++++++++++++++++++++++++++++++++
**
*Nset, Nset=BC
721, 722, 725, 726, 769, 770, 771, 772, 773, 774, 775, 776, 777, 778, 779, 780,
781, 782
*Nset, Nset=Vertex
724
*Nset, Nset=Load
719, 720, 723, 724, 741, 742, 743, 744, 745, 746, 747, 748, 749, 750, 751, 752,
753, 754
*Nset, Nset=ZSYMM
719, 720, 721, 722, 723, 724, 725, 726, 727, 728, 729, 730, 731, 732, 733, 734,
735, 736, 737, 738, 739, 740, 741, 742, 743, 744, 745, 746, 747, 748, 749, 750,
751, 752, 753, 754, 755, 756, 757, 758, 759, 760, 761, 762, 763, 764, 765, 766,
767, 768, 769, 770, 771, 772, 773, 774, 775, 776, 777, 778, 779, 780, 781, 782,
783, 784, 785, 786, 787, 788, 789, 790, 791, 792, 793, 794, 795, 796, 797, 798,
799, 800, 801, 802, 803, 804, 805, 806, 807, 808, 809, 810, 811, 812, 813, 814,
815, 816, 817, 818, 819, 820, 821, 822, 823, 824, 825, 826, 827, 828, 829, 830,
831, 832, 833, 834, 835, 836, 837, 838, 839, 840, 841, 842, 843, 844, 845, 846,
847, 848, 849, 850, 851, 852, 853, 854, 855, 856, 857, 858, 859, 860, 861, 862,
863, 864, 865, 866, 867, 868, 869, 870, 871, 872, 873, 874, 875, 876, 877, 878,
879, 880
*Nset, Nset=Internal-1_Internal_Selection-1_Traction
720, 719, 747, 754, 746, 753, 745, 752, 744, 751, 743, 750, 742, 749, 741, 748,
723, 724
**
** Element sets ++++++++++++++++++++++++++++++++++++++++++++
**
*Elset, Elset=C3D8
568, 569, 570, 571, 572, 573, 574, 575, 576, 577, 578, 579, 580, 581, 582, 583,
584, 585, 586, 587, 588, 589, 590, 591, 592, 593, 594, 595, 596, 597, 598, 599,
600, 601, 602, 603, 604, 605, 606, 607, 608, 609, 610, 611, 612, 613, 614, 615,
616, 617, 618, 619, 620, 621, 622, 623, 624, 625, 626, 627, 628, 629, 630, 631
*Elset, Elset=Internal-1_Internal_Selection-1_Traction_S3
568, 569, 570, 571, 572, 573, 574, 575
**
** Surfaces ++++++++++++++++++++++++++++++++++++++++++++++++
**
*Surface, Name=Internal_Selection-1_Traction, Type=Element
Internal-1_Internal_Selection-1_Traction_S3, S3
**
** Materials +++++++++++++++++++++++++++++++++++++++++++++++
**
** Name: Material-1: Deactivated
*Material, Name=Rubber
*Elastic,
70.0, 0.4999
**
** Sections ++++++++++++++++++++++++++++++++++++++++++++++++
**
*SOLID SECTION, ELSET=Solid_part-1, Material=Rubber
**
** Pre-tension sections ++++++++++++++++++++++++++++++++++++
**
**
** Constraints +++++++++++++++++++++++++++++++++++++++++++++
**
**
** Surface interactions ++++++++++++++++++++++++++++++++++++
**
**
** Contact pairs +++++++++++++++++++++++++++++++++++++++++++
**
**
** Steps +++++++++++++++++++++++++++++++++++++++++++++++++++
**
**
** Step-1 ++++++++++++++++++++++++++++++++++++++++++++++++++
**
*Step
*Static
**
** Boundary conditions +++++++++++++++++++++++++++++++++++++
**
*Boundary, op=New
** Name: Disp_rot-1
*Boundary
BC, 1, 1, 0
BC, 2, 2, 0
BC, 3, 3, 0
** Name: Disp_rot-2
*Boundary
ZSYMM, 3, 3, 0
**
** Loads +++++++++++++++++++++++++++++++++++++++++++++++++++
**
*Dload, op=New
*Cload, op=New
** Name: Traction
*Cload
720, 2, 15.625
754, 2, 31.25
747, 2, 31.25
719, 2, 15.625
753, 2, 31.25
746, 2, 31.25
752, 2, 31.25
745, 2, 31.25
751, 2, 31.25
744, 2, 31.25
750, 2, 31.25
743, 2, 31.25
749, 2, 31.25
742, 2, 31.25
748, 2, 31.25
741, 2, 31.25
724, 2, 15.625
723, 2, 15.625
**
** History outputs +++++++++++++++++++++++++++++++++++++++++
**
*Node print, Nset=Vertex
U
**
** Field outputs +++++++++++++++++++++++++++++++++++++++++++
**
*Node file
RF, U
*El file
S, E
*NODE PRINT, NSET=Vertex,
U2
**
** End step ++++++++++++++++++++++++++++++++++++++++++++++++
**
*End step
