**
** Heading +++++++++++++++++++++++++++++++++++++++++++++++++
**
*Heading
Hash: 14U2wvCl, Date: 05/19/2021, Unit system: M_KG_S_C
**
** Nodes +++++++++++++++++++++++++++++++++++++++++++++++++++
**
*Node
33, 1.50724726E+000, 7.46869527E-001, 5.08000000E-001
52, 2.46461011E+000, -1.72689979E-001, 3.38666667E-001
85, 2.20980738E+000, 3.50624348E-001, 0.00000000E+000
48, 1.94429259E+000, 5.81120096E-001, 3.38666667E-001
30, 2.12920185E+000, 4.36252939E-001, 5.08000000E-001
73, 8.89000000E-002, 2.38206832E-002, 5.08000000E-001
36, 8.18938327E-001, 6.49191488E-001, 5.08000000E-001
45, 1.27277599E+000, 7.61052425E-001, 3.38666667E-001
88, 1.62222689E+000, 7.22187735E-001, 0.00000000E+000
7, -6.53226603E-017, 0.00000000E+000, 1.69333333E-001
56, 1.04020629E+000, 7.28048419E-001, 1.69333333E-001
84, 2.34324569E+000, 1.57305580E-001, 0.00000000E+000
90, 1.15565963E+000, 7.50409855E-001, 0.00000000E+000
102, 2.04039705E+000, 5.13345179E-001, 5.08000000E-001
114, 6.17915454E-001, 5.27668925E-001, 4.23333333E-001
126, 1.94429259E+000, 5.81120096E-001, 4.23333333E-001
138, 5.27576246E-001, 4.52380585E-001, 1.69333333E-001
150, 1.84186204E+000, 6.38891109E-001, 1.69333333E-001
165, 1.27277599E+000, 7.61052425E-001, 8.46666667E-002
171, 2.39472670E+000, 5.15737870E-002, 8.46666667E-002
156, 2.34324569E+000, 1.57305580E-001, 1.69333333E-001
144, 1.15565963E+000, 7.50409855E-001, 1.69333333E-001
132, 2.39472670E+000, 5.15737870E-002, 4.23333333E-001
120, 1.27277599E+000, 7.61052425E-001, 4.23333333E-001
108, 7.15365213E-001, 5.93494839E-001, 5.08000000E-001
96, 2.48822272E+000, -4.06400000E-001, 2.54000000E-001
2, 0.00000000E+000, 0.00000000E+000, 5.08000000E-001
8, -6.53226603E-017, 0.00000000E+000, 3.38666667E-001
14, 2.39472670E+000, 5.15737870E-002, 0.00000000E+000
20, 1.27277599E+000, 7.61052425E-001, 0.00000000E+000
26, 2.48822272E+000, -4.06400000E-001, 3.38666667E-001
32, 1.73414307E+000, 6.86072978E-001, 5.08000000E-001
38, 4.45262757E-001, 3.68392514E-001, 5.08000000E-001
44, 1.04020629E+000, 7.28048419E-001, 3.38666667E-001
50, 2.28139706E+000, 2.57326850E-001, 3.38666667E-001
53, 4.45262757E-001, 3.68392514E-001, 1.69333333E-001
146, 1.39036895E+000, 7.59868318E-001, 1.69333333E-001
63, 2.39472670E+000, 5.15737870E-002, 1.69333333E-001
97, 2.48822272E+000, -4.06400000E-001, 4.23333333E-001
76, 1.77800000E-001, 4.76413664E-002, 4.23333333E-001
70, 3.07958634E-001, 1.77800000E-001, 8.46666667E-002
10, 3.07958634E-001, 1.77800000E-001, 1.69333333E-001
31, 1.94429259E+000, 5.81120096E-001, 5.08000000E-001
80, 2.42879317E-001, 1.12720683E-001, 1.69333333E-001
167, 1.73414307E+000, 6.86072978E-001, 8.46666667E-002
161, 4.45262757E-001, 3.68392514E-001, 8.46666667E-002
154, 2.20980738E+000, 3.50624348E-001, 1.69333333E-001
148, 1.62222689E+000, 7.22187735E-001, 1.69333333E-001
142, 9.27585564E-001, 6.94194647E-001, 1.69333333E-001
136, 3.71808849E-001, 2.76555539E-001, 1.69333333E-001
130, 2.28139706E+000, 2.57326850E-001, 4.23333333E-001
124, 1.73414307E+000, 6.86072978E-001, 4.23333333E-001
118, 1.04020629E+000, 7.28048419E-001, 4.23333333E-001
112, 4.45262757E-001, 3.68392514E-001, 4.23333333E-001
106, 1.15565963E+000, 7.50409855E-001, 5.08000000E-001
100, 2.34324569E+000, 1.57305580E-001, 5.08000000E-001
94, 3.71808849E-001, 2.76555539E-001, 0.00000000E+000
107, 9.27585564E-001, 6.94194647E-001, 5.08000000E-001
113, 5.27576246E-001, 4.52380585E-001, 3.38666667E-001
104, 1.62222689E+000, 7.22187735E-001, 5.08000000E-001
92, 7.15365213E-001, 5.93494839E-001, 0.00000000E+000
64, 2.46461011E+000, -1.72689979E-001, 1.69333333E-001
61, 2.12920185E+000, 4.36252939E-001, 1.69333333E-001
55, 8.18938327E-001, 6.49191488E-001, 1.69333333E-001
43, 8.18938327E-001, 6.49191488E-001, 3.38666667E-001
40, 1.77800000E-001, 4.76413664E-002, 1.69333333E-001
34, 1.27277599E+000, 7.61052425E-001, 5.08000000E-001
22, 8.18938327E-001, 6.49191488E-001, 0.00000000E+000
19, 1.50724726E+000, 7.46869527E-001, 0.00000000E+000
91, 9.27585564E-001, 6.94194647E-001, 0.00000000E+000
103, 1.84186204E+000, 6.38891109E-001, 5.08000000E-001
109, 5.27576246E-001, 4.52380585E-001, 5.08000000E-001
115, 7.15365213E-001, 5.93494839E-001, 3.38666667E-001
121, 1.39036895E+000, 7.59868318E-001, 3.38666667E-001
127, 2.04039705E+000, 5.13345179E-001, 3.38666667E-001
133, 2.43531858E+000, -5.87974319E-002, 3.38666667E-001
139, 6.17915454E-001, 5.27668925E-001, 2.54000000E-001
145, 1.27277599E+000, 7.61052425E-001, 2.54000000E-001
151, 1.94429259E+000, 5.81120096E-001, 2.54000000E-001
158, 2.43531858E+000, -5.87974319E-002, 1.69333333E-001
164, 1.04020629E+000, 7.28048419E-001, 8.46666667E-002
170, 2.28139706E+000, 2.57326850E-001, 8.46666667E-002
159, 2.46461011E+000, -1.72689979E-001, 2.54000000E-001
81, 1.77800000E-001, 4.76413664E-002, 8.46666667E-002
78, 8.89000000E-002, 2.38206832E-002, 1.69333333E-001
75, 8.89000000E-002, 2.38206832E-002, 3.38666667E-001
72, 3.07958634E-001, 1.77800000E-001, 4.23333333E-001
69, 2.42879317E-001, 1.12720683E-001, 0.00000000E+000
66, -6.53226603E-017, 0.00000000E+000, 2.54000000E-001
60, 1.94429259E+000, 5.81120096E-001, 1.69333333E-001
57, 1.27277599E+000, 7.61052425E-001, 1.69333333E-001
54, 6.17915454E-001, 5.27668925E-001, 1.69333333E-001
51, 2.39472670E+000, 5.15737870E-002, 3.38666667E-001
82, 2.48230458E+000, -2.88950087E-001, 0.00000000E+000
83, 2.43531858E+000, -5.87974319E-002, 0.00000000E+000
67, -3.26613301E-017, 0.00000000E+000, 4.23333333E-001
46, 1.50724726E+000, 7.46869527E-001, 3.38666667E-001
25, 2.48822272E+000, -4.06400000E-001, 1.69333333E-001
4, 3.07958634E-001, 1.77800000E-001, 5.08000000E-001
3, 3.07958634E-001, 1.77800000E-001, 0.00000000E+000
6, 2.48822272E+000, -4.06400000E-001, 5.08000000E-001
12, 1.77800000E-001, 4.76413664E-002, 5.08000000E-001
18, 1.73414307E+000, 6.86072978E-001, 0.00000000E+000
39, 1.77800000E-001, 4.76413664E-002, 3.38666667E-001
42, 6.17915454E-001, 5.27668925E-001, 3.38666667E-001
9, 1.77800000E-001, 4.76413664E-002, 0.00000000E+000
116, 8.18938327E-001, 6.49191488E-001, 4.23333333E-001
119, 1.15565963E+000, 7.50409855E-001, 3.38666667E-001
122, 1.50724726E+000, 7.46869527E-001, 4.23333333E-001
125, 1.84186204E+000, 6.38891109E-001, 3.38666667E-001
128, 2.12920185E+000, 4.36252939E-001, 4.23333333E-001
131, 2.34324569E+000, 1.57305580E-001, 3.38666667E-001
134, 2.46461011E+000, -1.72689979E-001, 4.23333333E-001
137, 4.45262757E-001, 3.68392514E-001, 2.54000000E-001
140, 7.15365213E-001, 5.93494839E-001, 1.69333333E-001
143, 1.04020629E+000, 7.28048419E-001, 2.54000000E-001
149, 1.73414307E+000, 6.86072978E-001, 2.54000000E-001
152, 2.04039705E+000, 5.13345179E-001, 1.69333333E-001
155, 2.28139706E+000, 2.57326850E-001, 2.54000000E-001
160, 2.48230458E+000, -2.88950087E-001, 1.69333333E-001
163, 8.18938327E-001, 6.49191488E-001, 8.46666667E-002
166, 1.50724726E+000, 7.46869527E-001, 8.46666667E-002
169, 2.12920185E+000, 4.36252939E-001, 8.46666667E-002
172, 2.46461011E+000, -1.72689979E-001, 8.46666667E-002
157, 2.39472670E+000, 5.15737870E-002, 2.54000000E-001
79, 1.77800000E-001, 4.76413664E-002, 2.54000000E-001
1, 0.00000000E+000, 0.00000000E+000, 0.00000000E+000
77, 2.42879317E-001, 1.12720683E-001, 3.38666667E-001
74, 2.42879317E-001, 1.12720683E-001, 5.08000000E-001
71, 3.07958634E-001, 1.77800000E-001, 2.54000000E-001
68, 8.89000000E-002, 2.38206832E-002, 0.00000000E+000
65, -3.26613301E-017, 0.00000000E+000, 8.46666667E-002
62, 2.28139706E+000, 2.57326850E-001, 1.69333333E-001
59, 1.73414307E+000, 6.86072978E-001, 1.69333333E-001
47, 1.73414307E+000, 6.86072978E-001, 3.38666667E-001
41, 4.45262757E-001, 3.68392514E-001, 3.38666667E-001
35, 1.04020629E+000, 7.28048419E-001, 5.08000000E-001
29, 2.28139706E+000, 2.57326850E-001, 5.08000000E-001
23, 6.17915454E-001, 5.27668925E-001, 0.00000000E+000
17, 1.94429259E+000, 5.81120096E-001, 0.00000000E+000
11, 3.07958634E-001, 1.77800000E-001, 3.38666667E-001
5, 2.48822272E+000, -4.06400000E-001, 0.00000000E+000
87, 1.84186204E+000, 6.38891109E-001, 0.00000000E+000
93, 5.27576246E-001, 4.52380585E-001, 0.00000000E+000
99, 2.43531858E+000, -5.87974319E-002, 5.08000000E-001
105, 1.39036895E+000, 7.59868318E-001, 5.08000000E-001
111, 3.71808849E-001, 2.76555539E-001, 3.38666667E-001
117, 9.27585564E-001, 6.94194647E-001, 3.38666667E-001
123, 1.62222689E+000, 7.22187735E-001, 3.38666667E-001
129, 2.20980738E+000, 3.50624348E-001, 3.38666667E-001
135, 2.48230458E+000, -2.88950087E-001, 3.38666667E-001
141, 8.18938327E-001, 6.49191488E-001, 2.54000000E-001
147, 1.50724726E+000, 7.46869527E-001, 2.54000000E-001
153, 2.12920185E+000, 4.36252939E-001, 2.54000000E-001
162, 6.17915454E-001, 5.27668925E-001, 8.46666667E-002
168, 1.94429259E+000, 5.81120096E-001, 8.46666667E-002
24, 4.45262757E-001, 3.68392514E-001, 0.00000000E+000
49, 2.12920185E+000, 4.36252939E-001, 3.38666667E-001
89, 1.39036895E+000, 7.59868318E-001, 0.00000000E+000
16, 2.12920185E+000, 4.36252939E-001, 0.00000000E+000
58, 1.50724726E+000, 7.46869527E-001, 1.69333333E-001
110, 3.71808849E-001, 2.76555539E-001, 5.08000000E-001
95, 2.48822272E+000, -4.06400000E-001, 8.46666667E-002
27, 2.46461011E+000, -1.72689979E-001, 5.08000000E-001
15, 2.28139706E+000, 2.57326850E-001, 0.00000000E+000
101, 2.20980738E+000, 3.50624348E-001, 5.08000000E-001
98, 2.48230458E+000, -2.88950087E-001, 5.08000000E-001
37, 6.17915454E-001, 5.27668925E-001, 5.08000000E-001
13, 2.46461011E+000, -1.72689979E-001, 0.00000000E+000
86, 2.04039705E+000, 5.13345179E-001, 0.00000000E+000
28, 2.39472670E+000, 5.15737870E-002, 5.08000000E-001
21, 1.04020629E+000, 7.28048419E-001, 0.00000000E+000
**
** Elements ++++++++++++++++++++++++++++++++++++++++++++++++
**
*Element, Type=S8, Elset=Shell_part-1
1, 2, 8, 39, 12, 67, 75, 76, 73
2, 12, 39, 11, 4, 76, 77, 72, 74
3, 8, 7, 40, 39, 66, 78, 79, 75
4, 39, 40, 10, 11, 79, 80, 71, 77
5, 7, 1, 9, 40, 65, 68, 81, 78
6, 40, 9, 3, 10, 81, 69, 70, 80
7, 4, 11, 41, 38, 72, 111, 112, 110
8, 38, 41, 42, 37, 112, 113, 114, 109
9, 37, 42, 43, 36, 114, 115, 116, 108
10, 36, 43, 44, 35, 116, 117, 118, 107
11, 35, 44, 45, 34, 118, 119, 120, 106
12, 34, 45, 46, 33, 120, 121, 122, 105
13, 33, 46, 47, 32, 122, 123, 124, 104
14, 32, 47, 48, 31, 124, 125, 126, 103
15, 31, 48, 49, 30, 126, 127, 128, 102
16, 30, 49, 50, 29, 128, 129, 130, 101
17, 29, 50, 51, 28, 130, 131, 132, 100
18, 28, 51, 52, 27, 132, 133, 134, 99
19, 27, 52, 26, 6, 134, 135, 97, 98
20, 11, 10, 53, 41, 71, 136, 137, 111
21, 41, 53, 54, 42, 137, 138, 139, 113
22, 42, 54, 55, 43, 139, 140, 141, 115
23, 43, 55, 56, 44, 141, 142, 143, 117
24, 44, 56, 57, 45, 143, 144, 145, 119
25, 45, 57, 58, 46, 145, 146, 147, 121
26, 46, 58, 59, 47, 147, 148, 149, 123
27, 47, 59, 60, 48, 149, 150, 151, 125
28, 48, 60, 61, 49, 151, 152, 153, 127
29, 49, 61, 62, 50, 153, 154, 155, 129
30, 50, 62, 63, 51, 155, 156, 157, 131
31, 51, 63, 64, 52, 157, 158, 159, 133
32, 52, 64, 25, 26, 159, 160, 96, 135
33, 10, 3, 24, 53, 70, 94, 161, 136
34, 53, 24, 23, 54, 161, 93, 162, 138
35, 54, 23, 22, 55, 162, 92, 163, 140
36, 55, 22, 21, 56, 163, 91, 164, 142
37, 56, 21, 20, 57, 164, 90, 165, 144
38, 57, 20, 19, 58, 165, 89, 166, 146
39, 58, 19, 18, 59, 166, 88, 167, 148
40, 59, 18, 17, 60, 167, 87, 168, 150
41, 60, 17, 16, 61, 168, 86, 169, 152
42, 61, 16, 15, 62, 169, 85, 170, 154
43, 62, 15, 14, 63, 170, 84, 171, 156
44, 63, 14, 13, 64, 171, 83, 172, 158
45, 64, 13, 5, 25, 172, 82, 95, 160
**
** Node sets +++++++++++++++++++++++++++++++++++++++++++++++
**
*Nset, Nset=fixedge
1, 2, 7, 8, 65, 66, 67
*Nset, Nset=load
5, 6, 25, 26, 95, 96, 97
*Nset, Nset=main
1, 2, 3, 4, 5, 6, 7, 8, 9, 10, 11, 12, 13, 14, 15, 16,
17, 18, 19, 20, 21, 22, 23, 24, 25, 26, 27, 28, 29, 30, 31, 32,
33, 34, 35, 36, 37, 38, 39, 40, 41, 42, 43, 44, 45, 46, 47, 48,
49, 50, 51, 52, 53, 54, 55, 56, 57, 58, 59, 60, 61, 62, 63, 64,
65, 66, 67, 68, 69, 70, 71, 72, 73, 74, 75, 76, 77, 78, 79, 80,
81, 82, 83, 84, 85, 86, 87, 88, 89, 90, 91, 92, 93, 94, 95, 96,
97, 98, 99, 100, 101, 102, 103, 104, 105, 106, 107, 108, 109, 110, 111, 112,
113, 114, 115, 116, 117, 118, 119, 120, 121, 122, 123, 124, 125, 126, 127, 128,
129, 130, 131, 132, 133, 134, 135, 136, 137, 138, 139, 140, 141, 142, 143, 144,
145, 146, 147, 148, 149, 150, 151, 152, 153, 154, 155, 156, 157, 158, 159, 160,
161, 162, 163, 164, 165, 166, 167, 168, 169, 170, 171, 172
*Nset, Nset=Disp
6
*Nset, Nset=Internal-1_Internal_Selection-1_Surface_traction-1
26, 6, 97, 25, 96, 5, 95
**
** Element sets ++++++++++++++++++++++++++++++++++++++++++++
**
*Elset, Elset=S8
1, 2, 3, 4, 5, 6, 7, 8, 9, 10, 11, 12, 13, 14, 15, 16,
17, 18, 19, 20, 21, 22, 23, 24, 25, 26, 27, 28, 29, 30, 31, 32,
33, 34, 35, 36, 37, 38, 39, 40, 41, 42, 43, 44, 45
*Elset, Elset=main
1, 2, 3, 4, 5, 6, 7, 8, 9, 10, 11, 12, 13, 14, 15, 16,
17, 18, 19, 20, 21, 22, 23, 24, 25, 26, 27, 28, 29, 30, 31, 32,
33, 34, 35, 36, 37, 38, 39, 40, 41, 42, 43, 44, 45
*Elset, Elset=Internal-1_Internal_Selection-1_Surface_traction-1_S5
19, 32, 45
**
** Surfaces ++++++++++++++++++++++++++++++++++++++++++++++++
**
*Surface, Name=Surface-1, Type=Node
load
*Surface, Name=Internal_Selection-1_Surface_traction-1, Type=Element
Internal-1_Internal_Selection-1_Surface_traction-1_S5, S5
**
** Materials +++++++++++++++++++++++++++++++++++++++++++++++
**
*Material, Name=Material-1
*Elastic
22770000, 0.35
**
** Sections ++++++++++++++++++++++++++++++++++++++++++++++++
**
*Shell section, Elset=S8, Material=Material-1, Offset=0
0.0508
**
** Pre-tension sections ++++++++++++++++++++++++++++++++++++
**
**
** Constraints +++++++++++++++++++++++++++++++++++++++++++++
**
**
** Surface interactions ++++++++++++++++++++++++++++++++++++
**
**
** Contact pairs +++++++++++++++++++++++++++++++++++++++++++
**
**
** Steps +++++++++++++++++++++++++++++++++++++++++++++++++++
**
**
** Step-1 ++++++++++++++++++++++++++++++++++++++++++++++++++
**
*Step
*Static
**
** Boundary conditions +++++++++++++++++++++++++++++++++++++
**
*Boundary, op=New
** Name: Displacement_rotation-1
*Boundary, Fixed
fixedge, 1, 1
fixedge, 2, 2
fixedge, 3, 3
**
** Loads +++++++++++++++++++++++++++++++++++++++++++++++++++
**
*Dload, op=New
*Cload, op=New
** Name: Surface_traction-1
*Cload
26, 3, 0.494244488893753
6, 3, 0.24712224443958
97, 3, 0.988488977758319
25, 3, 0.494244488893753
96, 3, 0.988488977816695
5, 3, 0.24712224443958
95, 3, 0.988488977758319
**
** History outputs +++++++++++++++++++++++++++++++++++++++++
**
*Node print, Nset=Disp, Totals=Yes
U
**
** Field outputs +++++++++++++++++++++++++++++++++++++++++++
**
*Node file
RF, U
*El file
S, E
**
** End step ++++++++++++++++++++++++++++++++++++++++++++++++
**
*End step
