**
** Heading +++++++++++++++++++++++++++++++++++++++++++++++++
**
*Heading
Hash: 14U2wvCl, Date: 05/19/2021, Unit system: M_KG_S_C
**
** Nodes +++++++++++++++++++++++++++++++++++++++++++++++++++
**
*Node
1, 0.00000000E+000, 0.00000000E+000, 0.00000000E+000
2, 0.00000000E+000, 0.00000000E+000, 5.08000000E-001
3, 3.07958634E-001, 1.77800000E-001, 0.00000000E+000
4, 3.07958634E-001, 1.77800000E-001, 5.08000000E-001
5, 2.48822272E+000, -4.06400000E-001, 0.00000000E+000
6, 2.48822272E+000, -4.06400000E-001, 5.08000000E-001
7, -6.53226603E-017, 0.00000000E+000, 1.69333333E-001
8, -6.53226603E-017, 0.00000000E+000, 3.38666667E-001
9, 1.77800000E-001, 4.76413664E-002, 0.00000000E+000
10, 3.07958634E-001, 1.77800000E-001, 1.69333333E-001
11, 3.07958634E-001, 1.77800000E-001, 3.38666667E-001
12, 1.77800000E-001, 4.76413664E-002, 5.08000000E-001
13, 2.46461011E+000, -1.72689979E-001, 0.00000000E+000
14, 2.39472670E+000, 5.15737870E-002, 0.00000000E+000
15, 2.28139706E+000, 2.57326850E-001, 0.00000000E+000
16, 2.12920185E+000, 4.36252939E-001, 0.00000000E+000
17, 1.94429259E+000, 5.81120096E-001, 0.00000000E+000
18, 1.73414307E+000, 6.86072978E-001, 0.00000000E+000
19, 1.50724726E+000, 7.46869527E-001, 0.00000000E+000
20, 1.27277599E+000, 7.61052425E-001, 0.00000000E+000
21, 1.04020629E+000, 7.28048419E-001, 0.00000000E+000
22, 8.18938327E-001, 6.49191488E-001, 0.00000000E+000
23, 6.17915454E-001, 5.27668925E-001, 0.00000000E+000
24, 4.45262757E-001, 3.68392514E-001, 0.00000000E+000
25, 2.48822272E+000, -4.06400000E-001, 1.69333333E-001
26, 2.48822272E+000, -4.06400000E-001, 3.38666667E-001
27, 2.46461011E+000, -1.72689979E-001, 5.08000000E-001
28, 2.39472670E+000, 5.15737870E-002, 5.08000000E-001
29, 2.28139706E+000, 2.57326850E-001, 5.08000000E-001
30, 2.12920185E+000, 4.36252939E-001, 5.08000000E-001
31, 1.94429259E+000, 5.81120096E-001, 5.08000000E-001
32, 1.73414307E+000, 6.86072978E-001, 5.08000000E-001
33, 1.50724726E+000, 7.46869527E-001, 5.08000000E-001
34, 1.27277599E+000, 7.61052425E-001, 5.08000000E-001
35, 1.04020629E+000, 7.28048419E-001, 5.08000000E-001
36, 8.18938327E-001, 6.49191488E-001, 5.08000000E-001
37, 6.17915454E-001, 5.27668925E-001, 5.08000000E-001
38, 4.45262757E-001, 3.68392514E-001, 5.08000000E-001
39, 1.77800000E-001, 4.76413664E-002, 3.38666667E-001
40, 1.77800000E-001, 4.76413664E-002, 1.69333333E-001
41, 4.45262757E-001, 3.68392514E-001, 3.38666667E-001
42, 6.17915454E-001, 5.27668925E-001, 3.38666667E-001
43, 8.18938327E-001, 6.49191488E-001, 3.38666667E-001
44, 1.04020629E+000, 7.28048419E-001, 3.38666667E-001
45, 1.27277599E+000, 7.61052425E-001, 3.38666667E-001
46, 1.50724726E+000, 7.46869527E-001, 3.38666667E-001
47, 1.73414307E+000, 6.86072978E-001, 3.38666667E-001
48, 1.94429259E+000, 5.81120096E-001, 3.38666667E-001
49, 2.12920185E+000, 4.36252939E-001, 3.38666667E-001
50, 2.28139706E+000, 2.57326850E-001, 3.38666667E-001
51, 2.39472670E+000, 5.15737870E-002, 3.38666667E-001
52, 2.46461011E+000, -1.72689979E-001, 3.38666667E-001
53, 4.45262757E-001, 3.68392514E-001, 1.69333333E-001
54, 6.17915454E-001, 5.27668925E-001, 1.69333333E-001
55, 8.18938327E-001, 6.49191488E-001, 1.69333333E-001
56, 1.04020629E+000, 7.28048419E-001, 1.69333333E-001
57, 1.27277599E+000, 7.61052425E-001, 1.69333333E-001
58, 1.50724726E+000, 7.46869527E-001, 1.69333333E-001
59, 1.73414307E+000, 6.86072978E-001, 1.69333333E-001
60, 1.94429259E+000, 5.81120096E-001, 1.69333333E-001
61, 2.12920185E+000, 4.36252939E-001, 1.69333333E-001
62, 2.28139706E+000, 2.57326850E-001, 1.69333333E-001
63, 2.39472670E+000, 5.15737870E-002, 1.69333333E-001
64, 2.46461011E+000, -1.72689979E-001, 1.69333333E-001
65, -3.26613301E-017, 0.00000000E+000, 8.46666667E-002
66, -6.53226603E-017, 0.00000000E+000, 2.54000000E-001
67, -3.26613301E-017, 0.00000000E+000, 4.23333333E-001
68, 8.89000000E-002, 2.38206832E-002, 0.00000000E+000
69, 2.42879317E-001, 1.12720683E-001, 0.00000000E+000
70, 3.07958634E-001, 1.77800000E-001, 8.46666667E-002
71, 3.07958634E-001, 1.77800000E-001, 2.54000000E-001
72, 3.07958634E-001, 1.77800000E-001, 4.23333333E-001
73, 8.89000000E-002, 2.38206832E-002, 5.08000000E-001
74, 2.42879317E-001, 1.12720683E-001, 5.08000000E-001
75, 8.89000000E-002, 2.38206832E-002, 3.38666667E-001
76, 1.77800000E-001, 4.76413664E-002, 4.23333333E-001
77, 2.42879317E-001, 1.12720683E-001, 3.38666667E-001
78, 8.89000000E-002, 2.38206832E-002, 1.69333333E-001
79, 1.77800000E-001, 4.76413664E-002, 2.54000000E-001
80, 2.42879317E-001, 1.12720683E-001, 1.69333333E-001
81, 1.77800000E-001, 4.76413664E-002, 8.46666667E-002
82, 2.48230458E+000, -2.88950087E-001, 0.00000000E+000
83, 2.43531858E+000, -5.87974319E-002, 0.00000000E+000
84, 2.34324569E+000, 1.57305580E-001, 0.00000000E+000
85, 2.20980738E+000, 3.50624348E-001, 0.00000000E+000
86, 2.04039705E+000, 5.13345179E-001, 0.00000000E+000
87, 1.84186204E+000, 6.38891109E-001, 0.00000000E+000
88, 1.62222689E+000, 7.22187735E-001, 0.00000000E+000
89, 1.39036895E+000, 7.59868318E-001, 0.00000000E+000
90, 1.15565963E+000, 7.50409855E-001, 0.00000000E+000
91, 9.27585564E-001, 6.94194647E-001, 0.00000000E+000
92, 7.15365213E-001, 5.93494839E-001, 0.00000000E+000
93, 5.27576246E-001, 4.52380585E-001, 0.00000000E+000
94, 3.71808849E-001, 2.76555539E-001, 0.00000000E+000
95, 2.48822272E+000, -4.06400000E-001, 8.46666667E-002
96, 2.48822272E+000, -4.06400000E-001, 2.54000000E-001
97, 2.48822272E+000, -4.06400000E-001, 4.23333333E-001
98, 2.48230458E+000, -2.88950087E-001, 5.08000000E-001
99, 2.43531858E+000, -5.87974319E-002, 5.08000000E-001
100, 2.34324569E+000, 1.57305580E-001, 5.08000000E-001
101, 2.20980738E+000, 3.50624348E-001, 5.08000000E-001
102, 2.04039705E+000, 5.13345179E-001, 5.08000000E-001
103, 1.84186204E+000, 6.38891109E-001, 5.08000000E-001
104, 1.62222689E+000, 7.22187735E-001, 5.08000000E-001
105, 1.39036895E+000, 7.59868318E-001, 5.08000000E-001
106, 1.15565963E+000, 7.50409855E-001, 5.08000000E-001
107, 9.27585564E-001, 6.94194647E-001, 5.08000000E-001
108, 7.15365213E-001, 5.93494839E-001, 5.08000000E-001
109, 5.27576246E-001, 4.52380585E-001, 5.08000000E-001
110, 3.71808849E-001, 2.76555539E-001, 5.08000000E-001
111, 3.71808849E-001, 2.76555539E-001, 3.38666667E-001
112, 4.45262757E-001, 3.68392514E-001, 4.23333333E-001
113, 5.27576246E-001, 4.52380585E-001, 3.38666667E-001
114, 6.17915454E-001, 5.27668925E-001, 4.23333333E-001
115, 7.15365213E-001, 5.93494839E-001, 3.38666667E-001
116, 8.18938327E-001, 6.49191488E-001, 4.23333333E-001
117, 9.27585564E-001, 6.94194647E-001, 3.38666667E-001
118, 1.04020629E+000, 7.28048419E-001, 4.23333333E-001
119, 1.15565963E+000, 7.50409855E-001, 3.38666667E-001
120, 1.27277599E+000, 7.61052425E-001, 4.23333333E-001
121, 1.39036895E+000, 7.59868318E-001, 3.38666667E-001
122, 1.50724726E+000, 7.46869527E-001, 4.23333333E-001
123, 1.62222689E+000, 7.22187735E-001, 3.38666667E-001
124, 1.73414307E+000, 6.86072978E-001, 4.23333333E-001
125, 1.84186204E+000, 6.38891109E-001, 3.38666667E-001
126, 1.94429259E+000, 5.81120096E-001, 4.23333333E-001
127, 2.04039705E+000, 5.13345179E-001, 3.38666667E-001
128, 2.12920185E+000, 4.36252939E-001, 4.23333333E-001
129, 2.20980738E+000, 3.50624348E-001, 3.38666667E-001
130, 2.28139706E+000, 2.57326850E-001, 4.23333333E-001
131, 2.34324569E+000, 1.57305580E-001, 3.38666667E-001
132, 2.39472670E+000, 5.15737870E-002, 4.23333333E-001
133, 2.43531858E+000, -5.87974319E-002, 3.38666667E-001
134, 2.46461011E+000, -1.72689979E-001, 4.23333333E-001
135, 2.48230458E+000, -2.88950087E-001, 3.38666667E-001
136, 3.71808849E-001, 2.76555539E-001, 1.69333333E-001
137, 4.45262757E-001, 3.68392514E-001, 2.54000000E-001
138, 5.27576246E-001, 4.52380585E-001, 1.69333333E-001
139, 6.17915454E-001, 5.27668925E-001, 2.54000000E-001
140, 7.15365213E-001, 5.93494839E-001, 1.69333333E-001
141, 8.18938327E-001, 6.49191488E-001, 2.54000000E-001
142, 9.27585564E-001, 6.94194647E-001, 1.69333333E-001
143, 1.04020629E+000, 7.28048419E-001, 2.54000000E-001
144, 1.15565963E+000, 7.50409855E-001, 1.69333333E-001
145, 1.27277599E+000, 7.61052425E-001, 2.54000000E-001
146, 1.39036895E+000, 7.59868318E-001, 1.69333333E-001
147, 1.50724726E+000, 7.46869527E-001, 2.54000000E-001
148, 1.62222689E+000, 7.22187735E-001, 1.69333333E-001
149, 1.73414307E+000, 6.86072978E-001, 2.54000000E-001
150, 1.84186204E+000, 6.38891109E-001, 1.69333333E-001
151, 1.94429259E+000, 5.81120096E-001, 2.54000000E-001
152, 2.04039705E+000, 5.13345179E-001, 1.69333333E-001
153, 2.12920185E+000, 4.36252939E-001, 2.54000000E-001
154, 2.20980738E+000, 3.50624348E-001, 1.69333333E-001
217, 2.48230458E+000, -2.88950087E-001, 8.46666667E-002
216, 2.43531858E+000, -5.87974319E-002, 8.46666667E-002
215, 2.34324569E+000, 1.57305580E-001, 8.46666667E-002
214, 2.20980738E+000, 3.50624348E-001, 8.46666667E-002
213, 2.04039705E+000, 5.13345179E-001, 8.46666667E-002
212, 1.84186204E+000, 6.38891109E-001, 8.46666667E-002
211, 1.62222689E+000, 7.22187735E-001, 8.46666667E-002
210, 1.39036895E+000, 7.59868318E-001, 8.46666667E-002
209, 1.15565963E+000, 7.50409855E-001, 8.46666667E-002
208, 9.27585564E-001, 6.94194647E-001, 8.46666667E-002
207, 7.15365213E-001, 5.93494839E-001, 8.46666667E-002
206, 5.27576246E-001, 4.52380585E-001, 8.46666667E-002
205, 3.71808849E-001, 2.76555539E-001, 8.46666667E-002
204, 2.48230458E+000, -2.88950087E-001, 2.54000000E-001
203, 2.43531858E+000, -5.87974319E-002, 2.54000000E-001
202, 2.34324569E+000, 1.57305580E-001, 2.54000000E-001
201, 2.20980738E+000, 3.50624348E-001, 2.54000000E-001
200, 2.04039705E+000, 5.13345179E-001, 2.54000000E-001
199, 1.84186204E+000, 6.38891109E-001, 2.54000000E-001
198, 1.62222689E+000, 7.22187735E-001, 2.54000000E-001
197, 1.39036895E+000, 7.59868318E-001, 2.54000000E-001
196, 1.15565963E+000, 7.50409855E-001, 2.54000000E-001
195, 9.27585564E-001, 6.94194647E-001, 2.54000000E-001
194, 7.15365213E-001, 5.93494839E-001, 2.54000000E-001
193, 5.27576246E-001, 4.52380585E-001, 2.54000000E-001
192, 3.71808849E-001, 2.76555539E-001, 2.54000000E-001
191, 2.48230458E+000, -2.88950087E-001, 4.23333333E-001
190, 2.43531858E+000, -5.87974319E-002, 4.23333333E-001
189, 2.34324569E+000, 1.57305580E-001, 4.23333333E-001
188, 2.20980738E+000, 3.50624348E-001, 4.23333333E-001
187, 2.04039705E+000, 5.13345179E-001, 4.23333333E-001
186, 1.84186204E+000, 6.38891109E-001, 4.23333333E-001
185, 1.62222689E+000, 7.22187735E-001, 4.23333333E-001
184, 1.39036895E+000, 7.59868318E-001, 4.23333333E-001
183, 1.15565963E+000, 7.50409855E-001, 4.23333333E-001
182, 9.27585564E-001, 6.94194647E-001, 4.23333333E-001
181, 7.15365213E-001, 5.93494839E-001, 4.23333333E-001
180, 5.27576246E-001, 4.52380585E-001, 4.23333333E-001
179, 3.71808849E-001, 2.76555539E-001, 4.23333333E-001
178, 2.51447171E-001, 1.04152829E-001, 8.46666667E-002
177, 9.20360524E-002, 1.21167762E-002, 8.46666667E-002
176, 2.51447171E-001, 1.04152829E-001, 2.54000000E-001
175, 9.20360524E-002, 1.21167762E-002, 2.54000000E-001
174, 2.51447171E-001, 1.04152829E-001, 4.23333333E-001
173, 9.20360524E-002, 1.21167762E-002, 4.23333333E-001
172, 2.46461011E+000, -1.72689979E-001, 8.46666667E-002
171, 2.39472670E+000, 5.15737870E-002, 8.46666667E-002
170, 2.28139706E+000, 2.57326850E-001, 8.46666667E-002
169, 2.12920185E+000, 4.36252939E-001, 8.46666667E-002
168, 1.94429259E+000, 5.81120096E-001, 8.46666667E-002
167, 1.73414307E+000, 6.86072978E-001, 8.46666667E-002
166, 1.50724726E+000, 7.46869527E-001, 8.46666667E-002
165, 1.27277599E+000, 7.61052425E-001, 8.46666667E-002
164, 1.04020629E+000, 7.28048419E-001, 8.46666667E-002
163, 8.18938327E-001, 6.49191488E-001, 8.46666667E-002
162, 6.17915454E-001, 5.27668925E-001, 8.46666667E-002
161, 4.45262757E-001, 3.68392514E-001, 8.46666667E-002
160, 2.48230458E+000, -2.88950087E-001, 1.69333333E-001
159, 2.46461011E+000, -1.72689979E-001, 2.54000000E-001
158, 2.43531858E+000, -5.87974319E-002, 1.69333333E-001
157, 2.39472670E+000, 5.15737870E-002, 2.54000000E-001
156, 2.34324569E+000, 1.57305580E-001, 1.69333333E-001
155, 2.28139706E+000, 2.57326850E-001, 2.54000000E-001
**
** Elements ++++++++++++++++++++++++++++++++++++++++++++++++
**
*Element, Type=S6, Elset=Shell_part-1
1, 11, 4, 12, 72, 74, 174
2, 40, 39, 8, 79, 75, 175
3, 10, 11, 39, 71, 77, 176
4, 9, 40, 7, 81, 78, 177
5, 3, 10, 40, 70, 80, 178
6, 41, 38, 4, 112, 110, 179
7, 42, 37, 38, 114, 109, 180
8, 43, 36, 37, 116, 108, 181
9, 44, 35, 36, 118, 107, 182
10, 45, 34, 35, 120, 106, 183
11, 46, 33, 34, 122, 105, 184
12, 47, 32, 33, 124, 104, 185
13, 48, 31, 32, 126, 103, 186
14, 49, 30, 31, 128, 102, 187
15, 50, 29, 30, 130, 101, 188
16, 51, 28, 29, 132, 100, 189
17, 52, 27, 28, 134, 99, 190
18, 26, 6, 27, 97, 98, 191
19, 53, 41, 11, 137, 111, 192
20, 54, 42, 41, 139, 113, 193
21, 55, 43, 42, 141, 115, 194
22, 56, 44, 43, 143, 117, 195
23, 57, 45, 44, 145, 119, 196
24, 58, 46, 45, 147, 121, 197
25, 59, 47, 46, 149, 123, 198
26, 60, 48, 47, 151, 125, 199
27, 61, 49, 48, 153, 127, 200
28, 62, 50, 49, 155, 129, 201
29, 63, 51, 50, 157, 131, 202
30, 64, 52, 51, 159, 133, 203
31, 25, 26, 52, 96, 135, 204
32, 24, 53, 10, 161, 136, 205
33, 23, 54, 53, 162, 138, 206
34, 22, 55, 54, 163, 140, 207
35, 21, 56, 55, 164, 142, 208
36, 20, 57, 56, 165, 144, 209
37, 19, 58, 57, 166, 146, 210
38, 18, 59, 58, 167, 148, 211
39, 17, 60, 59, 168, 150, 212
40, 16, 61, 60, 169, 152, 213
41, 15, 62, 61, 170, 154, 214
42, 14, 63, 62, 171, 156, 215
43, 13, 64, 63, 172, 158, 216
44, 5, 25, 64, 95, 160, 217
45, 39, 12, 2, 76, 73, 173
46, 39, 2, 8, 173, 67, 75
47, 11, 12, 39, 174, 76, 77
48, 40, 8, 7, 175, 66, 78
49, 10, 39, 40, 176, 79, 80
50, 9, 7, 1, 177, 65, 68
51, 3, 40, 9, 178, 81, 69
52, 41, 4, 11, 179, 72, 111
53, 42, 38, 41, 180, 112, 113
54, 43, 37, 42, 181, 114, 115
55, 44, 36, 43, 182, 116, 117
56, 45, 35, 44, 183, 118, 119
57, 46, 34, 45, 184, 120, 121
58, 47, 33, 46, 185, 122, 123
59, 48, 32, 47, 186, 124, 125
60, 49, 31, 48, 187, 126, 127
61, 50, 30, 49, 188, 128, 129
62, 51, 29, 50, 189, 130, 131
63, 52, 28, 51, 190, 132, 133
64, 26, 27, 52, 191, 134, 135
65, 53, 11, 10, 192, 71, 136
66, 54, 41, 53, 193, 137, 138
67, 55, 42, 54, 194, 139, 140
68, 56, 43, 55, 195, 141, 142
69, 57, 44, 56, 196, 143, 144
70, 58, 45, 57, 197, 145, 146
71, 59, 46, 58, 198, 147, 148
72, 60, 47, 59, 199, 149, 150
73, 61, 48, 60, 200, 151, 152
74, 62, 49, 61, 201, 153, 154
75, 63, 50, 62, 202, 155, 156
76, 64, 51, 63, 203, 157, 158
77, 25, 52, 64, 204, 159, 160
78, 24, 10, 3, 205, 70, 94
79, 23, 53, 24, 206, 161, 93
80, 22, 54, 23, 207, 162, 92
81, 21, 55, 22, 208, 163, 91
82, 20, 56, 21, 209, 164, 90
83, 19, 57, 20, 210, 165, 89
84, 18, 58, 19, 211, 166, 88
85, 17, 59, 18, 212, 167, 87
86, 16, 60, 17, 213, 168, 86
87, 15, 61, 16, 214, 169, 85
88, 14, 62, 15, 215, 170, 84
89, 13, 63, 14, 216, 171, 83
90, 5, 64, 13, 217, 172, 82
**
** Node sets +++++++++++++++++++++++++++++++++++++++++++++++
**
*Nset, Nset=fixedge
1, 2, 7, 8, 65, 66, 67
*Nset, Nset=load
5, 6, 25, 26, 95, 96, 97
*Nset, Nset=main
1, 2, 3, 4, 5, 6, 7, 8, 9, 10, 11, 12, 13, 14, 15, 16,
17, 18, 19, 20, 21, 22, 23, 24, 25, 26, 27, 28, 29, 30, 31, 32,
33, 34, 35, 36, 37, 38, 39, 40, 41, 42, 43, 44, 45, 46, 47, 48,
49, 50, 51, 52, 53, 54, 55, 56, 57, 58, 59, 60, 61, 62, 63, 64,
65, 66, 67, 68, 69, 70, 71, 72, 73, 74, 75, 76, 77, 78, 79, 80,
81, 82, 83, 84, 85, 86, 87, 88, 89, 90, 91, 92, 93, 94, 95, 96,
97, 98, 99, 100, 101, 102, 103, 104, 105, 106, 107, 108, 109, 110, 111, 112,
113, 114, 115, 116, 117, 118, 119, 120, 121, 122, 123, 124, 125, 126, 127, 128,
129, 130, 131, 132, 133, 134, 135, 136, 137, 138, 139, 140, 141, 142, 143, 144,
145, 146, 147, 148, 149, 150, 151, 152, 153, 154, 155, 156, 157, 158, 159, 160,
161, 162, 163, 164, 165, 166, 167, 168, 169, 170, 171, 172, 173, 174, 175, 176,
177, 178, 179, 180, 181, 182, 183, 184, 185, 186, 187, 188, 189, 190, 191, 192,
193, 194, 195, 196, 197, 198, 199, 200, 201, 202, 203, 204, 205, 206, 207, 208,
209, 210, 211, 212, 213, 214, 215, 216, 217
*Nset, Nset=Disp
6
*Nset, Nset=Internal-1_Internal_Selection-1_Surface_traction-1
26, 6, 97, 25, 96, 5, 95
**
** Element sets ++++++++++++++++++++++++++++++++++++++++++++
**
*Elset, Elset=S6
1, 2, 3, 4, 5, 6, 7, 8, 9, 10, 11, 12, 13, 14, 15, 16,
17, 18, 19, 20, 21, 22, 23, 24, 25, 26, 27, 28, 29, 30, 31, 32,
33, 34, 35, 36, 37, 38, 39, 40, 41, 42, 43, 44, 45, 46, 47, 48,
49, 50, 51, 52, 53, 54, 55, 56, 57, 58, 59, 60, 61, 62, 63, 64,
65, 66, 67, 68, 69, 70, 71, 72, 73, 74, 75, 76, 77, 78, 79, 80,
81, 82, 83, 84, 85, 86, 87, 88, 89, 90
*Elset, Elset=main
1, 2, 3, 4, 5, 6, 7, 8, 9, 10, 11, 12, 13, 14, 15, 16,
17, 18, 19, 20, 21, 22, 23, 24, 25, 26, 27, 28, 29, 30, 31, 32,
33, 34, 35, 36, 37, 38, 39, 40, 41, 42, 43, 44, 45, 46, 47, 48,
49, 50, 51, 52, 53, 54, 55, 56, 57, 58, 59, 60, 61, 62, 63, 64,
65, 66, 67, 68, 69, 70, 71, 72, 73, 74, 75, 76, 77, 78, 79, 80,
81, 82, 83, 84, 85, 86, 87, 88, 89, 90
*Elset, Elset=Internal-1_Internal_Selection-1_Surface_traction-1_S3
18, 31, 44
**
** Surfaces ++++++++++++++++++++++++++++++++++++++++++++++++
**
*Surface, Name=Surface-1, Type=Node
load
*Surface, Name=Internal_Selection-1_Surface_traction-1, Type=Element
Internal-1_Internal_Selection-1_Surface_traction-1_S3, S3
**
** Materials +++++++++++++++++++++++++++++++++++++++++++++++
**
*Material, Name=Material-1
*Elastic
22770000, 0.35
**
** Sections ++++++++++++++++++++++++++++++++++++++++++++++++
**
*Shell section, Elset=S6, Material=Material-1, Offset=0
0.0508
**
** Pre-tension sections ++++++++++++++++++++++++++++++++++++
**
**
** Constraints +++++++++++++++++++++++++++++++++++++++++++++
**
**
** Surface interactions ++++++++++++++++++++++++++++++++++++
**
**
** Contact pairs +++++++++++++++++++++++++++++++++++++++++++
**
**
** Steps +++++++++++++++++++++++++++++++++++++++++++++++++++
**
**
** Step-1 ++++++++++++++++++++++++++++++++++++++++++++++++++
**
*Step
*Static
**
** Boundary conditions +++++++++++++++++++++++++++++++++++++
**
*Boundary, op=New
** Name: Displacement_rotation-1
*Boundary, Fixed
fixedge, 1, 1
fixedge, 2, 2
fixedge, 3, 3
**
** Loads +++++++++++++++++++++++++++++++++++++++++++++++++++
**
*Dload, op=New
*Cload, op=New
** Name: Surface_traction-1
*Cload
26, 3, 0.494244488893753
6, 3, 0.24712224443958
97, 3, 0.988488977758319
25, 3, 0.494244488893753
96, 3, 0.988488977816695
5, 3, 0.24712224443958
95, 3, 0.988488977758319
**
** History outputs +++++++++++++++++++++++++++++++++++++++++
**
**
** Field outputs +++++++++++++++++++++++++++++++++++++++++++
**
*Node file
RF, U
*El file
S, E
**
** End step ++++++++++++++++++++++++++++++++++++++++++++++++
**
*End step
