**
** Heading +++++++++++++++++++++++++++++++++++++++++++++++++
**
*Heading
Hash: 14U2wvCl, Date: 05/19/2021, Unit system: M_KG_S_C
**
** Nodes +++++++++++++++++++++++++++++++++++++++++++++++++++
**
*Node
7, -6.53226603E-017, 0.00000000E+000, 1.69333333E-001
16, 2.12920185E+000, 4.36252939E-001, 0.00000000E+000
5, 2.48822272E+000, -4.06400000E-001, 0.00000000E+000
11, 3.07958634E-001, 1.77800000E-001, 3.38666667E-001
10, 3.07958634E-001, 1.77800000E-001, 1.69333333E-001
15, 2.28139706E+000, 2.57326850E-001, 0.00000000E+000
6, 2.48822272E+000, -4.06400000E-001, 5.08000000E-001
8, -6.53226603E-017, 0.00000000E+000, 3.38666667E-001
12, 1.77800000E-001, 4.76413664E-002, 5.08000000E-001
13, 2.46461011E+000, -1.72689979E-001, 0.00000000E+000
55, 8.18938327E-001, 6.49191488E-001, 1.69333333E-001
29, 2.28139706E+000, 2.57326850E-001, 5.08000000E-001
28, 2.39472670E+000, 5.15737870E-002, 5.08000000E-001
27, 2.46461011E+000, -1.72689979E-001, 5.08000000E-001
26, 2.48822272E+000, -4.06400000E-001, 3.38666667E-001
25, 2.48822272E+000, -4.06400000E-001, 1.69333333E-001
24, 4.45262757E-001, 3.68392514E-001, 0.00000000E+000
23, 6.17915454E-001, 5.27668925E-001, 0.00000000E+000
22, 8.18938327E-001, 6.49191488E-001, 0.00000000E+000
21, 1.04020629E+000, 7.28048419E-001, 0.00000000E+000
20, 1.27277599E+000, 7.61052425E-001, 0.00000000E+000
19, 1.50724726E+000, 7.46869527E-001, 0.00000000E+000
18, 1.73414307E+000, 6.86072978E-001, 0.00000000E+000
17, 1.94429259E+000, 5.81120096E-001, 0.00000000E+000
64, 2.46461011E+000, -1.72689979E-001, 1.69333333E-001
63, 2.39472670E+000, 5.15737870E-002, 1.69333333E-001
62, 2.28139706E+000, 2.57326850E-001, 1.69333333E-001
61, 2.12920185E+000, 4.36252939E-001, 1.69333333E-001
60, 1.94429259E+000, 5.81120096E-001, 1.69333333E-001
59, 1.73414307E+000, 6.86072978E-001, 1.69333333E-001
58, 1.50724726E+000, 7.46869527E-001, 1.69333333E-001
57, 1.27277599E+000, 7.61052425E-001, 1.69333333E-001
56, 1.04020629E+000, 7.28048419E-001, 1.69333333E-001
54, 6.17915454E-001, 5.27668925E-001, 1.69333333E-001
53, 4.45262757E-001, 3.68392514E-001, 1.69333333E-001
52, 2.46461011E+000, -1.72689979E-001, 3.38666667E-001
51, 2.39472670E+000, 5.15737870E-002, 3.38666667E-001
50, 2.28139706E+000, 2.57326850E-001, 3.38666667E-001
49, 2.12920185E+000, 4.36252939E-001, 3.38666667E-001
48, 1.94429259E+000, 5.81120096E-001, 3.38666667E-001
47, 1.73414307E+000, 6.86072978E-001, 3.38666667E-001
46, 1.50724726E+000, 7.46869527E-001, 3.38666667E-001
45, 1.27277599E+000, 7.61052425E-001, 3.38666667E-001
44, 1.04020629E+000, 7.28048419E-001, 3.38666667E-001
43, 8.18938327E-001, 6.49191488E-001, 3.38666667E-001
42, 6.17915454E-001, 5.27668925E-001, 3.38666667E-001
41, 4.45262757E-001, 3.68392514E-001, 3.38666667E-001
40, 1.77800000E-001, 4.76413664E-002, 1.69333333E-001
39, 1.77800000E-001, 4.76413664E-002, 3.38666667E-001
38, 4.45262757E-001, 3.68392514E-001, 5.08000000E-001
37, 6.17915454E-001, 5.27668925E-001, 5.08000000E-001
36, 8.18938327E-001, 6.49191488E-001, 5.08000000E-001
35, 1.04020629E+000, 7.28048419E-001, 5.08000000E-001
34, 1.27277599E+000, 7.61052425E-001, 5.08000000E-001
33, 1.50724726E+000, 7.46869527E-001, 5.08000000E-001
32, 1.73414307E+000, 6.86072978E-001, 5.08000000E-001
31, 1.94429259E+000, 5.81120096E-001, 5.08000000E-001
30, 2.12920185E+000, 4.36252939E-001, 5.08000000E-001
2, 0.00000000E+000, 0.00000000E+000, 5.08000000E-001
1, 0.00000000E+000, 0.00000000E+000, 0.00000000E+000
14, 2.39472670E+000, 5.15737870E-002, 0.00000000E+000
9, 1.77800000E-001, 4.76413664E-002, 0.00000000E+000
4, 3.07958634E-001, 1.77800000E-001, 5.08000000E-001
3, 3.07958634E-001, 1.77800000E-001, 0.00000000E+000
**
** Elements ++++++++++++++++++++++++++++++++++++++++++++++++
**
*Element, Type=S3, Elset=Shell_part-1
1, 11, 12, 39
2, 40, 8, 7
3, 10, 39, 40
4, 9, 7, 1
5, 3, 40, 9
6, 41, 4, 11
7, 42, 38, 41
8, 43, 37, 42
9, 44, 36, 43
10, 45, 35, 44
11, 46, 34, 45
12, 47, 33, 46
13, 48, 32, 47
14, 49, 31, 48
15, 50, 30, 49
16, 51, 29, 50
17, 52, 28, 51
18, 26, 27, 52
19, 53, 11, 10
20, 54, 41, 53
21, 55, 42, 54
22, 56, 43, 55
23, 57, 44, 56
24, 58, 45, 57
25, 59, 46, 58
26, 60, 47, 59
27, 61, 48, 60
28, 62, 49, 61
29, 63, 50, 62
30, 64, 51, 63
31, 25, 52, 64
32, 24, 10, 3
33, 23, 53, 24
34, 22, 54, 23
35, 21, 55, 22
36, 20, 56, 21
37, 19, 57, 20
38, 18, 58, 19
39, 17, 59, 18
40, 16, 60, 17
41, 15, 61, 16
42, 14, 62, 15
43, 13, 63, 14
44, 5, 64, 13
45, 39, 2, 8
46, 39, 12, 2
47, 11, 4, 12
48, 40, 39, 8
49, 10, 11, 39
50, 9, 40, 7
51, 3, 10, 40
52, 41, 38, 4
53, 42, 37, 38
54, 43, 36, 37
55, 44, 35, 36
56, 45, 34, 35
57, 46, 33, 34
58, 47, 32, 33
59, 48, 31, 32
60, 49, 30, 31
61, 50, 29, 30
62, 51, 28, 29
63, 52, 27, 28
64, 26, 6, 27
65, 53, 41, 11
66, 54, 42, 41
67, 55, 43, 42
68, 56, 44, 43
69, 57, 45, 44
70, 58, 46, 45
71, 59, 47, 46
72, 60, 48, 47
73, 61, 49, 48
74, 62, 50, 49
75, 63, 51, 50
76, 64, 52, 51
77, 25, 26, 52
78, 24, 53, 10
79, 23, 54, 53
80, 22, 55, 54
81, 21, 56, 55
82, 20, 57, 56
83, 19, 58, 57
84, 18, 59, 58
85, 17, 60, 59
86, 16, 61, 60
87, 15, 62, 61
88, 14, 63, 62
89, 13, 64, 63
90, 5, 25, 64
**
** Node sets +++++++++++++++++++++++++++++++++++++++++++++++
**
*Nset, Nset=fixedge
1, 2, 7, 8
*Nset, Nset=load
5, 6, 25, 26
*Nset, Nset=main
1, 2, 3, 4, 5, 6, 7, 8, 9, 10, 11, 12, 13, 14, 15, 16,
17, 18, 19, 20, 21, 22, 23, 24, 25, 26, 27, 28, 29, 30, 31, 32,
33, 34, 35, 36, 37, 38, 39, 40, 41, 42, 43, 44, 45, 46, 47, 48,
49, 50, 51, 52, 53, 54, 55, 56, 57, 58, 59, 60, 61, 62, 63, 64

*Nset, Nset=Disp
6
*Nset, Nset=Internal-1_Internal_Selection-1_Surface_traction-1
26, 6, 25, 5
**
** Element sets ++++++++++++++++++++++++++++++++++++++++++++
**
*Elset, Elset=S3
1, 2, 3, 4, 5, 6, 7, 8, 9, 10, 11, 12, 13, 14, 15, 16,
17, 18, 19, 20, 21, 22, 23, 24, 25, 26, 27, 28, 29, 30, 31, 32,
33, 34, 35, 36, 37, 38, 39, 40, 41, 42, 43, 44, 45, 46, 47, 48,
49, 50, 51, 52, 53, 54, 55, 56, 57, 58, 59, 60, 61, 62, 63, 64,
65, 66, 67, 68, 69, 70, 71, 72, 73, 74, 75, 76, 77, 78, 79, 80,
81, 82, 83, 84, 85, 86, 87, 88, 89, 90
*Elset, Elset=main
1, 2, 3, 4, 5, 6, 7, 8, 9, 10, 11, 12, 13, 14, 15, 16,
17, 18, 19, 20, 21, 22, 23, 24, 25, 26, 27, 28, 29, 30, 31, 32,
33, 34, 35, 36, 37, 38, 39, 40, 41, 42, 43, 44, 45, 46, 47, 48,
49, 50, 51, 52, 53, 54, 55, 56, 57, 58, 59, 60, 61, 62, 63, 64,
65, 66, 67, 68, 69, 70, 71, 72, 73, 74, 75, 76, 77, 78, 79, 80,
81, 82, 83, 84, 85, 86, 87, 88, 89, 90
*Elset, Elset=Internal-1_Internal_Selection-1_Surface_traction-1_S3
64, 77, 90
**
** Surfaces ++++++++++++++++++++++++++++++++++++++++++++++++
**
*Surface, Name=Surface-1, Type=Node
load
*Surface, Name=Internal_Selection-1_Surface_traction-1, Type=Element
Internal-1_Internal_Selection-1_Surface_traction-1_S3, S3
**
** Materials +++++++++++++++++++++++++++++++++++++++++++++++
**
*Material, Name=Material-1
*Elastic
22770000, 0.35
**
** Sections ++++++++++++++++++++++++++++++++++++++++++++++++
**
*Shell section, Elset=S3, Material=Material-1, Offset=0
0.0508
**
** Pre-tension sections ++++++++++++++++++++++++++++++++++++
**
**
** Constraints +++++++++++++++++++++++++++++++++++++++++++++
**
**
** Surface interactions ++++++++++++++++++++++++++++++++++++
**
**
** Contact pairs +++++++++++++++++++++++++++++++++++++++++++
**
**
** Steps +++++++++++++++++++++++++++++++++++++++++++++++++++
**
**
** Step-1 ++++++++++++++++++++++++++++++++++++++++++++++++++
**
*Step
*Static
**
** Boundary conditions +++++++++++++++++++++++++++++++++++++
**
*Boundary, op=New
** Name: Displacement_rotation-1
*Boundary, Fixed
fixedge, 1, 1
fixedge, 2, 2
fixedge, 3, 3
**
** Loads +++++++++++++++++++++++++++++++++++++++++++++++++++
**
*Dload, op=New
*Cload, op=New
** Name: Surface_traction-1
*Cload
26, 3, 1.48273346668126
6, 3, 0.741366733318739
25, 3, 1.48273346668126
5, 3, 0.741366733318739
**
** History outputs +++++++++++++++++++++++++++++++++++++++++
**
*Node print, Nset=Disp, Totals=Yes
U
**
** Field outputs +++++++++++++++++++++++++++++++++++++++++++
**
*Node file
RF, U
*El file
S, E
**
** End step ++++++++++++++++++++++++++++++++++++++++++++++++
**
*End step
