**
** Heading +++++++++++++++++++++++++++++++++++++++++++++++++
**
*Heading
Hash: 14U2wvCl, Date: 04/25/2021, Unit system: M_KG_S_C
**
** Nodes +++++++++++++++++++++++++++++++++++++++++++++++++++
**
*Node
1, 0.00000000E+000, 0.00000000E+000, 0.00000000E+000
2, 0.00000000E+000, 0.00000000E+000, 5.08000000E-001
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**
** Elements ++++++++++++++++++++++++++++++++++++++++++++++++
**
*Element, Type=S4R, Elset=Shell_part-1
1, 2, 31, 422, 75
2, 75, 422, 423, 76
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**
** Node sets +++++++++++++++++++++++++++++++++++++++++++++++
**
*Nset, Nset=fixedge
1, 2, 7, 8, 9, 10
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*Nset, Nset=load
5, 6, 245, 246, 247, 248
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*Nset, Nset=main
1, 2, 3, 4, 5, 6
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*Nset, Nset=Disp
6
*Nset, Nset=Internal-1_Internal_Selection-1_Surface_traction-1
269, 6, 268, 267, 266, 265
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*Nset, Nset=Reference_point-1_ref_4672
4672
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**
** Element sets ++++++++++++++++++++++++++++++++++++++++++++
**
*Elset, Elset=S4R
1, 2, 3, 4, 5, 6
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*Elset, Elset=main
1, 2, 3, 4, 5, 6
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*Elset, Elset=Internal-1_Internal_Selection-1_Surface_traction-1_S5
647, 800, 953, 1106, 1259, 1412
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**
** Surfaces ++++++++++++++++++++++++++++++++++++++++++++++++
**
*Surface, Name=Surface-1, Type=Node
load
*Surface, Name=Internal_Selection-1_Surface_traction-1, Type=Element
Internal-1_Internal_Selection-1_Surface_traction-1_S5, S5
**
** Materials +++++++++++++++++++++++++++++++++++++++++++++++
**
*Material, Name=Material-1
*Elastic
22770000, 0.35
**
** Sections ++++++++++++++++++++++++++++++++++++++++++++++++
**
*Shell section, Elset=S4R, Material=Material-1, Offset=0
0.0508
**
** Pre-tension sections ++++++++++++++++++++++++++++++++++++
**
**
** Constraints +++++++++++++++++++++++++++++++++++++++++++++
**
**
** Surface interactions ++++++++++++++++++++++++++++++++++++
**
**
** Contact pairs +++++++++++++++++++++++++++++++++++++++++++
**
**
** Steps +++++++++++++++++++++++++++++++++++++++++++++++++++
**
**
** Step-1 ++++++++++++++++++++++++++++++++++++++++++++++++++
**
*Step
*Static
**
** Boundary conditions +++++++++++++++++++++++++++++++++++++
**
*Boundary, op=New
** Name: Displacement_rotation-1
*Boundary, Fixed
fixedge, 1, 1
fixedge, 2, 2
fixedge, 3, 3
**
** Loads +++++++++++++++++++++++++++++++++++++++++++++++++++
**
*Dload, op=New
*Cload, op=New
** Name: Surface_traction-1
*Cload
269, 3, 0.171084630782702
6, 3, 0.085542315391351
268, 3, 0.171084630782702
267, 3, 0.17108463073892
266, 3, 0.17108463073892
265, 3, 0.171084630782702
264, 3, 0.171084630782702
263, 3, 0.171084630782702
262, 3, 0.171084630782702
261, 3, 0.17108463073892
260, 3, 0.17108463073892
259, 3, 0.171084630782702
258, 3, 0.171084630782702
257, 3, 0.171084630782702
256, 3, 0.171084630782702
255, 3, 0.171084630782702
254, 3, 0.171084630738921
253, 3, 0.17108463073892
252, 3, 0.171084630782702
251, 3, 0.171084630782702
250, 3, 0.171084630773946
249, 3, 0.171084630765189
248, 3, 0.171084630769568
247, 3, 0.171084630769568
246, 3, 0.171084630769568
245, 3, 0.171084630769568
5, 3, 0.0855423153825947
**
** History outputs +++++++++++++++++++++++++++++++++++++++++
**
**
** Field outputs +++++++++++++++++++++++++++++++++++++++++++
**
*Node file
RF, U
*El file
S, E
**
** End step ++++++++++++++++++++++++++++++++++++++++++++++++
**
*End step
